Tue 09 Jul 2024 03:49:30 PM EDT
$PROBLEM PK model 1 cmt base

$INPUT ID TIME MDV EVID DV AMT  SEX WT ETN NUM
$DATA ../../../../extdata/acop2.csv IGNORE=@
IGNORE(ID.EQ.2)
$SUBROUTINES ADVAN2 TRANS2

$PK
ET=1
IF(ETN.EQ.3) ET=1.3
KA = THETA(1)
CL = THETA(2)*((WT/70)**0.75)* EXP(ETA(1))
V = THETA(3)*EXP(ETA(2))
SC=V

$THETA
(0, 2)  ; KA
(0, 3)  ; CL
(0, 10) ; V2
(0.02)  ; RUVp
(1)     ; RUVa

$OMEGA
0.05    ; iiv CL
0.2     ; iiv V2

$SIGMA
1 FIX

$ERROR
IPRED = F
IRES = DV-IPRED
W = IPRED*THETA(4) + THETA(5)
IF (W.EQ.0) W = 1
IWRES = IRES/W
Y= IPRED+W*ERR(1)
FAKE=1 ; for testing

$EST METHOD=1 INTERACTION MAXEVAL=9999 SIG=3 PRINT=5 NOABORT POSTHOC
$COV
$TABLE NUM IPRED NPDE CWRES NOPRINT ONEHEADER FILE=2.tab
$TABLE NUM CL V KA ETAS(1:LAST) NOAPPEND NOPRINT ONEHEADER FILE=2par.tab
$TABLE ID CL NOAPPEND NOPRINT ONEHEADER FIRSTONLY FILE=2first1.tab ; for testing firstonly
$TABLE NUM CL NOAPPEND NOPRINT ONEHEADER FIRSTONLY FILE=2first2.tab ; for testing firstonly
$TABLE NUM ID CL NOAPPEND NOPRINT ONEHEADER FIRSTONLY FILE=2first3.tab ; for testing firstonly
$TABLE NUM CL KA FAKE NOAPPEND NOPRINT ONEHEADER FILE=2dups.tab ; for testing dropping duplicate columns

NM-TRAN MESSAGES
 WARNINGS AND ERRORS (IF ANY) FOR PROBLEM    1
 (WARNING  2) NM-TRAN INFERS THAT THE DATA ARE POPULATION.
 LIM VALUES MAXLIM ASSESSED BY NMTRAN: 1,2,3,4,5,6,7,8,10,11,13,15,16
Note: Analytical 2nd Derivatives are constructed in FSUBS but are never used.
      You may insert $ABBR DERIV2=NO after the first $PROB to save FSUBS construction and compilation time

1NONLINEAR MIXED EFFECTS MODEL PROGRAM (NONMEM) VERSION 7.5.1
 ORIGINALLY DEVELOPED BY STUART BEAL, LEWIS SHEINER, AND ALISON BOECKMANN
 CURRENT DEVELOPERS ARE ROBERT BAUER, ICON DEVELOPMENT SOLUTIONS,
 AND ALISON BOECKMANN. IMPLEMENTATION, EFFICIENCY, AND STANDARDIZATION
 PERFORMED BY NOUS INFOSYSTEMS.
 PROBLEM NO.:         1
 PK model 1 cmt base
 TOT. NO. OF OBS RECS:      741
 TOT. NO. OF INDIVIDUALS:       39
 ONE COMPARTMENT MODEL WITH FIRST-ORDER ABSORPTION (ADVAN2)
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 #TBLN:      1
 #METH: First Order Conditional Estimation with Interaction
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
 #TERM:
0MINIMIZATION SUCCESSFUL
 NO. OF FUNCTION EVALUATIONS USED:      447
 NO. OF SIG. DIGITS IN FINAL EST.:  3.2

 ETABAR IS THE ARITHMETIC MEAN OF THE ETA-ESTIMATES,
 AND THE P-VALUE IS GIVEN FOR THE NULL HYPOTHESIS THAT THE TRUE MEAN IS 0.

 ETABAR:         1.9737E-03 -6.2091E-03
 SE:             4.0948E-02  6.1297E-02
 N:                      39          39

 P VAL.:         9.6156E-01  9.1932E-01

 ETASHRINKSD(%)  1.8534E+01  3.3363E+00
 ETASHRINKVR(%)  3.3634E+01  6.5614E+00
 EBVSHRINKSD(%)  1.8503E+01  2.5645E+00
 EBVSHRINKVR(%)  3.3583E+01  5.0631E+00
 RELATIVEINF(%)  6.6299E+01  9.4769E+01
 EPSSHRINKSD(%)  4.0846E+00
 EPSSHRINKVR(%)  8.0023E+00


 TOTAL DATA POINTS NORMALLY DISTRIBUTED (N):          741
 N*LOG(2PI) CONSTANT TO OBJECTIVE FUNCTION:    1361.8669062093250
 OBJECTIVE FUNCTION VALUE WITHOUT CONSTANT:    2583.3109008854512
 OBJECTIVE FUNCTION VALUE WITH CONSTANT:       3945.1778070947762
 REPORTED OBJECTIVE FUNCTION DOES NOT CONTAIN CONSTANT

 TOTAL EFFECTIVE ETAS (NIND*NETA):                            78


 #TERE:
 Elapsed estimation  time in seconds:     3.54
 Elapsed covariance  time in seconds:     0.82
 Elapsed postprocess time in seconds:     0.20

 ********************               FIRST ORDER CONDITIONAL ESTIMATION WITH INTERACTION              ********************
 #OBJT:**************                       MINIMUM VALUE OF OBJECTIVE FUNCTION                      ********************
 #OBJV:********************************************     2583.311       **************************************************

 ********************               FIRST ORDER CONDITIONAL ESTIMATION WITH INTERACTION              ********************
 ********************                             FINAL PARAMETER ESTIMATE                           ********************

 THETA - VECTOR OF FIXED EFFECTS PARAMETERS   *********
         TH 1      TH 2      TH 3      TH 4      TH 5
         2.32E+00  5.46E+01  4.63E+02 -8.20E-02  4.18E+00

 OMEGA - COV MATRIX FOR RANDOM EFFECTS - ETAS  ********
         ETA1      ETA2
 ETA1
+        9.85E-02
 ETA2
+        0.00E+00  1.57E-01

 SIGMA - COV MATRIX FOR RANDOM EFFECTS - EPSILONS  ****
         EPS1
 EPS1
+        1.00E+00

 OMEGA - CORR MATRIX FOR RANDOM EFFECTS - ETAS  *******
         ETA1      ETA2
 ETA1
+        3.14E-01
 ETA2
+        0.00E+00  3.96E-01

 SIGMA - CORR MATRIX FOR RANDOM EFFECTS - EPSILONS  ***
         EPS1
 EPS1
+        1.00E+00

 ********************               FIRST ORDER CONDITIONAL ESTIMATION WITH INTERACTION              ********************
 ********************                            STANDARD ERROR OF ESTIMATE                          ********************

 THETA - VECTOR OF FIXED EFFECTS PARAMETERS   *********
         TH 1      TH 2      TH 3      TH 4      TH 5
         8.72E-02  3.38E+00  3.03E+01  5.61E-02  1.38E+00

 OMEGA - COV MATRIX FOR RANDOM EFFECTS - ETAS  ********
         ETA1      ETA2
 ETA1
+        2.03E-02
 ETA2
+       .........  2.72E-02

 SIGMA - COV MATRIX FOR RANDOM EFFECTS - EPSILONS  ****
         EPS1
 EPS1
+       .........

 OMEGA - CORR MATRIX FOR RANDOM EFFECTS - ETAS  *******
         ETA1      ETA2
 ETA1
+        3.24E-02
 ETA2
+       .........  3.44E-02

 SIGMA - CORR MATRIX FOR RANDOM EFFECTS - EPSILONS  ***
         EPS1
 EPS1
+       .........

 ********************               FIRST ORDER CONDITIONAL ESTIMATION WITH INTERACTION              ********************
 ********************                          COVARIANCE MATRIX OF ESTIMATE                         ********************

            TH 1      TH 2      TH 3      TH 4      TH 5      OM11      OM12      OM22      SG11
 TH 1
+        7.60E-03
 TH 2
+        1.60E-02  1.14E+01
 TH 3
+       -2.93E-01 -2.39E+01  9.16E+02
 TH 4
+       -2.85E-03  3.94E-02  1.07E-01  3.15E-03
 TH 5
+        6.73E-02 -1.07E+00 -4.56E+00 -7.68E-02  1.90E+00
 OM11
+        9.93E-05 -1.21E-02 -1.23E-01  1.13E-04 -2.58E-03  4.14E-04
 OM12
+       ......... ......... ......... ......... ......... ......... .........
 OM22
+        1.11E-04  3.54E-02 -7.88E-03  3.72E-04 -8.95E-03  1.11E-04 .........  7.42E-04
 SG11
+       ......... ......... ......... ......... ......... ......... ......... ......... .........

 ********************               FIRST ORDER CONDITIONAL ESTIMATION WITH INTERACTION              ********************
 ********************                          CORRELATION MATRIX OF ESTIMATE                        ********************

            TH 1      TH 2      TH 3      TH 4      TH 5      OM11      OM12      OM22      SG11
 TH 1
+        8.72E-02
 TH 2
+        5.43E-02  3.38E+00
 TH 3
+       -1.11E-01 -2.34E-01  3.03E+01
 TH 4
+       -5.82E-01  2.08E-01  6.30E-02  5.61E-02
 TH 5
+        5.60E-01 -2.31E-01 -1.09E-01 -9.93E-01  1.38E+00
 OM11
+        5.60E-02 -1.76E-01 -1.99E-01  9.89E-02 -9.20E-02  2.03E-02
 OM12
+       ......... ......... ......... ......... ......... ......... .........
 OM22
+        4.68E-02  3.85E-01 -9.56E-03  2.43E-01 -2.38E-01  2.00E-01 .........  2.72E-02
 SG11
+       ......... ......... ......... ......... ......... ......... ......... ......... .........
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 Elapsed finaloutput time in seconds:     0.09
 #CPUT: Total CPU Time in Seconds,       14.339
