Thu Mar  4 13:44:25 EST 2021
$PROBLEM PK model 1 cmt base

$INPUT ID TIME MDV EVID DV AMT  SEX WT ETN
$DATA ../../../../extdata/acop.csv IGNORE=@
$SUBROUTINES ADVAN2 TRANS2

$PK
ET=1
IF(ETN.EQ.3) ET=1.3
KA = THETA(1)
CL = THETA(2)*((WT/70)**0.75)* EXP(ETA(1))
V = THETA(3)*EXP(ETA(2))
SC=V

$THETA
(0, 2)  ; KA
(0, 3)  ; CL
(0, 10) ; V2
(0.02)  ; RUVp
(1)     ; RUVa

$OMEGA
0.05    ; iiv CL
0.2     ; iiv V2

$SIGMA
1 FIX

$ERROR
IPRED = F
IRES = DV-IPRED
W = IPRED*THETA(4) + THETA(5)
IF (W.EQ.0) W = 1
IWRES = IRES/W
Y= IPRED+W*ERR(1)

$EST METHOD=1 INTERACTION MAXEVAL=9999 SIG=3 PRINT=5 NOABORT POSTHOC
$EST METHOD=BAYES NBURN=0 NITER=10
$EST METHOD=IMP
$COV

NM-TRAN MESSAGES
 WARNINGS AND ERRORS (IF ANY) FOR PROBLEM    1
 (WARNING  2) NM-TRAN INFERS THAT THE DATA ARE POPULATION.

1NONLINEAR MIXED EFFECTS MODEL PROGRAM (NONMEM) VERSION 7.4.4
 ORIGINALLY DEVELOPED BY STUART BEAL, LEWIS SHEINER, AND ALISON BOECKMANN
 CURRENT DEVELOPERS ARE ROBERT BAUER, ICON DEVELOPMENT SOLUTIONS,
 AND ALISON BOECKMANN. IMPLEMENTATION, EFFICIENCY, AND STANDARDIZATION
 PERFORMED BY NOUS INFOSYSTEMS.
 PROBLEM NO.:         1
 PK model 1 cmt base
 TOT. NO. OF OBS RECS:      760
 TOT. NO. OF INDIVIDUALS:       40
 ONE COMPARTMENT MODEL WITH FIRST-ORDER ABSORPTION (ADVAN2)
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 #TBLN:      1
 #METH: First Order Conditional Estimation with Interaction
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
 #TERM:
0MINIMIZATION SUCCESSFUL
 NO. OF FUNCTION EVALUATIONS USED:      366
 NO. OF SIG. DIGITS IN FINAL EST.:  3.2

 ETABAR IS THE ARITHMETIC MEAN OF THE ETA-ESTIMATES,
 AND THE P-VALUE IS GIVEN FOR THE NULL HYPOTHESIS THAT THE TRUE MEAN IS 0.

 ETABAR:         1.7967E-03 -7.3900E-03
 SE:             3.9994E-02  5.9922E-02
 N:                      40          40

 P VAL.:         9.6417E-01  9.0185E-01

 ETASHRINKSD(%)  1.7512E+01  2.0596E+00
 ETASHRINKVR(%)  3.1956E+01  4.0768E+00
 EBVSHRINKSD(%)  1.8525E+01  2.5411E+00
 EBVSHRINKVR(%)  3.3618E+01  5.0177E+00
 EPSSHRINKSD(%)  4.0910E+00
 EPSSHRINKVR(%)  8.0147E+00


 TOTAL DATA POINTS NORMALLY DISTRIBUTED (N):          760
 N*LOG(2PI) CONSTANT TO OBJECTIVE FUNCTION:    1396.7865704711026
 OBJECTIVE FUNCTION VALUE WITHOUT CONSTANT:    2636.8457703290751
 OBJECTIVE FUNCTION VALUE WITH CONSTANT:       4033.6323408001776
 REPORTED OBJECTIVE FUNCTION DOES NOT CONTAIN CONSTANT

 TOTAL EFFECTIVE ETAS (NIND*NETA):                            80


 #TERE:
 Elapsed estimation  time in seconds:     2.35

 ********************               FIRST ORDER CONDITIONAL ESTIMATION WITH INTERACTION              ********************
 #OBJT:**************                       MINIMUM VALUE OF OBJECTIVE FUNCTION                      ********************
 #OBJV:********************************************     2636.846       **************************************************

 ********************               FIRST ORDER CONDITIONAL ESTIMATION WITH INTERACTION              ********************
 ********************                             FINAL PARAMETER ESTIMATE                           ********************

 THETA - VECTOR OF FIXED EFFECTS PARAMETERS   *********
         TH 1      TH 2      TH 3      TH 4      TH 5
         2.31E+00  5.50E+01  4.65E+02 -8.06E-02  4.13E+00

 OMEGA - COV MATRIX FOR RANDOM EFFECTS - ETAS  ********
         ETA1      ETA2
 ETA1
+        9.64E-02
 ETA2
+        0.00E+00  1.54E-01

 SIGMA - COV MATRIX FOR RANDOM EFFECTS - EPSILONS  ****
         EPS1
 EPS1
+        1.00E+00

 OMEGA - CORR MATRIX FOR RANDOM EFFECTS - ETAS  *******
         ETA1      ETA2
 ETA1
+        3.11E-01
 ETA2
+        0.00E+00  3.92E-01

 SIGMA - CORR MATRIX FOR RANDOM EFFECTS - EPSILONS  ***
         EPS1
 EPS1
+        1.00E+00
 #TBLN:      2
 #METH: MCMC Bayesian Analysis
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
 #TERM:
 BURN-IN WAS NOT TESTED FOR CONVERGENCE
 STATISTICAL PORTION WAS COMPLETED

 TOTAL DATA POINTS NORMALLY DISTRIBUTED (N):          760
 N*LOG(2PI) CONSTANT TO OBJECTIVE FUNCTION:    1396.7865704711026
 OBJECTIVE FUNCTION VALUE WITHOUT CONSTANT:    2334.6561157982946
 OBJECTIVE FUNCTION VALUE WITH CONSTANT:       3731.4426862693972
 REPORTED OBJECTIVE FUNCTION DOES NOT CONTAIN CONSTANT

 TOTAL EFFECTIVE ETAS (NIND*NETA):                            80
 NIND*NETA*LOG(2PI) CONSTANT TO OBJECTIVE FUNCTION:    147.03016531274761
 OBJECTIVE FUNCTION VALUE WITHOUT CONSTANT:    2334.6561157982946
 OBJECTIVE FUNCTION VALUE WITH CONSTANT:       2481.6862811110423
 REPORTED OBJECTIVE FUNCTION DOES NOT CONTAIN CONSTANT


 #TERE:
 Elapsed estimation  time in seconds:     0.11
 Elapsed covariance  time in seconds:     0.00

 ********************                              MCMC BAYESIAN ANALYSIS                            ********************
 #OBJT:**************                       AVERAGE VALUE OF LIKELIHOOD FUNCTION                     ********************
 #OBJV:********************************************     2334.656       **************************************************
 #OBJS:********************************************       20.673 (STD) **************************************************

 ********************                              MCMC BAYESIAN ANALYSIS                            ********************
 ********************                             FINAL PARAMETER ESTIMATE                           ********************

 THETA - VECTOR OF FIXED EFFECTS PARAMETERS   *********
         TH 1      TH 2      TH 3      TH 4      TH 5
         2.22E+00  5.64E+01  4.62E+02 -8.06E-02  4.10E+00

 OMEGA - COV MATRIX FOR RANDOM EFFECTS - ETAS  ********
         ETA1      ETA2
 ETA1
+        1.10E-01
 ETA2
+        0.00E+00  1.56E-01

 SIGMA - COV MATRIX FOR RANDOM EFFECTS - EPSILONS  ****
         EPS1
 EPS1
+        1.00E+00

 OMEGA - CORR MATRIX FOR RANDOM EFFECTS - ETAS  *******
         ETA1      ETA2
 ETA1
+        3.27E-01
 ETA2
+        0.00E+00  3.92E-01

 SIGMA - CORR MATRIX FOR RANDOM EFFECTS - EPSILONS  ***
         EPS1
 EPS1
+        1.00E+00

 ********************                              MCMC BAYESIAN ANALYSIS                            ********************
 ********************                STANDARD ERROR OF ESTIMATE (From Sample Variance)               ********************

 THETA - VECTOR OF FIXED EFFECTS PARAMETERS   *********
         TH 1      TH 2      TH 3      TH 4      TH 5
         3.96E-02  6.96E-01  1.05E+00  2.12E-03  4.33E-02

 OMEGA - COV MATRIX FOR RANDOM EFFECTS - ETAS  ********
         ETA1      ETA2
 ETA1
+        3.93E-02
 ETA2
+        0.00E+00  4.16E-02

 SIGMA - COV MATRIX FOR RANDOM EFFECTS - EPSILONS  ****
         EPS1
 EPS1
+        0.00E+00

 OMEGA - CORR MATRIX FOR RANDOM EFFECTS - ETAS  *******
         ETA1      ETA2
 ETA1
+        5.76E-02
 ETA2
+        0.00E+00  5.09E-02

 SIGMA - CORR MATRIX FOR RANDOM EFFECTS - EPSILONS  ***
         EPS1
 EPS1
+        0.00E+00

 ********************                              MCMC BAYESIAN ANALYSIS                            ********************
 ********************               COVARIANCE MATRIX OF ESTIMATE (From Sample Variance)             ********************

            TH 1      TH 2      TH 3      TH 4      TH 5      OM11      OM12      OM22      SG11
 TH 1
+        1.57E-03
 TH 2
+       -2.28E-02  4.85E-01
 TH 3
+        3.49E-02 -5.66E-01  1.11E+00
 TH 4
+       -1.32E-05  2.42E-04 -8.59E-05  4.50E-06
 TH 5
+       -2.93E-04  1.05E-03  8.08E-03  4.91E-05  1.88E-03
 OM11
+       -7.01E-04  1.18E-02 -8.97E-03  4.33E-05  1.08E-03  1.54E-03
 OM12
+       ......... ......... ......... ......... ......... ......... .........
 OM22
+        3.18E-04 -3.20E-03  1.46E-03 -2.88E-05 -1.69E-04 -3.98E-04  0.00E+00  1.73E-03
 SG11
+       ......... ......... ......... ......... ......... ......... ......... ......... .........

 ********************                              MCMC BAYESIAN ANALYSIS                            ********************
 ********************              CORRELATION MATRIX OF ESTIMATE (From Sample Variance)             ********************

            TH 1      TH 2      TH 3      TH 4      TH 5      OM11      OM12      OM22      SG11
 TH 1
+        3.96E-02
 TH 2
+       -8.27E-01  6.96E-01
 TH 3
+        8.36E-01 -7.70E-01  1.05E+00
 TH 4
+       -1.57E-01  1.64E-01 -3.84E-02  2.12E-03
 TH 5
+       -1.71E-01  3.48E-02  1.77E-01  5.34E-01  4.33E-02
 OM11
+       -4.51E-01  4.30E-01 -2.17E-01  5.20E-01  6.32E-01  3.93E-02
 OM12
+       ......... ......... ......... ......... ......... ......... .........
 OM22
+        1.93E-01 -1.11E-01  3.31E-02 -3.26E-01 -9.36E-02 -2.43E-01  0.00E+00  4.16E-02
 SG11
+       ......... ......... ......... ......... ......... ......... ......... ......... .........
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 #TBLN:      3
 #METH: Importance Sampling
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
 #TERM:
 OPTIMIZATION WAS NOT TESTED FOR CONVERGENCE

 ETABAR IS THE ARITHMETIC MEAN OF THE ETA-ESTIMATES,
 AND THE P-VALUE IS GIVEN FOR THE NULL HYPOTHESIS THAT THE TRUE MEAN IS 0.

 ETABAR:        -4.5710E-02 -1.1719E-01
 SE:             3.9780E-02  5.9559E-02
 N:                      40          40

 P VAL.:         2.5053E-01  4.9112E-02

 ETASHRINKSD(%)  2.1253E+01  4.4410E+00
 ETASHRINKVR(%)  3.7989E+01  8.6849E+00
 EBVSHRINKSD(%)  1.8800E+01  2.6851E+00
 EBVSHRINKVR(%)  3.4066E+01  5.2980E+00
 EPSSHRINKSD(%)  1.9839E+00
 EPSSHRINKVR(%)  3.9284E+00


 TOTAL DATA POINTS NORMALLY DISTRIBUTED (N):          760
 N*LOG(2PI) CONSTANT TO OBJECTIVE FUNCTION:    1396.7865704711026
 OBJECTIVE FUNCTION VALUE WITHOUT CONSTANT:    2675.2933330801688
 OBJECTIVE FUNCTION VALUE WITH CONSTANT:       4072.0799035512714
 REPORTED OBJECTIVE FUNCTION DOES NOT CONTAIN CONSTANT

 TOTAL EFFECTIVE ETAS (NIND*NETA):                            80


 #TERE:
 Elapsed estimation  time in seconds:     8.26

 Number of Negative Eigenvalues in Matrix=           1
 Most negative value=  -272.91434177585177
 Most positive value=   101139.57966153696
 Forcing positive definiteness
 Root mean square deviation of matrix from original=    7.2451670692345329E-008

 Elapsed covariance  time in seconds:     8.42

 ********************                               IMPORTANCE SAMPLING                              ********************
 #OBJT:**************                        FINAL VALUE OF OBJECTIVE FUNCTION                       ********************
 #OBJV:********************************************     2675.293       **************************************************

 ********************                               IMPORTANCE SAMPLING                              ********************
 ********************                             FINAL PARAMETER ESTIMATE                           ********************

 THETA - VECTOR OF FIXED EFFECTS PARAMETERS   *********
         TH 1      TH 2      TH 3      TH 4      TH 5
         2.34E+00  5.87E+01  5.30E+02 -8.08E-02  4.12E+00

 OMEGA - COV MATRIX FOR RANDOM EFFECTS - ETAS  ********
         ETA1      ETA2
 ETA1
+        1.05E-01
 ETA2
+        0.00E+00  1.59E-01

 SIGMA - COV MATRIX FOR RANDOM EFFECTS - EPSILONS  ****
         EPS1
 EPS1
+        1.00E+00

 OMEGA - CORR MATRIX FOR RANDOM EFFECTS - ETAS  *******
         ETA1      ETA2
 ETA1
+        3.24E-01
 ETA2
+        0.00E+00  3.99E-01

 SIGMA - CORR MATRIX FOR RANDOM EFFECTS - EPSILONS  ***
         EPS1
 EPS1
+        1.00E+00
 Elapsed postprocess time in seconds:     0.00
 Elapsed finaloutput time in seconds:     0.00
 #CPUT: Total CPU Time in Seconds,       19.117
