Mon Aug 24 10:31:19 EDT 2020
;Model Desc: Two Compartment model with Clearance and central volume modeled with covariates age and gender
;Project Name: nm7examples
;Project ID: NO PROJECT DESCRIPTION

$PROB RUN# example2 (from sampc)
$INPUT C SET ID JID TIME DV=CONC AMT=DOSE RATE EVID MDV CMT GNDR AGE
$DATA ../example2.csv IGNORE=C
$SUBROUTINES ADVAN3 TRANS4

;NTHETA=number of Thetas to be estimated
;NETA=number of Etas to be estimated (and to be described by NETAxNETA OMEGA matrix)
;NTHP=number of thetas which have a prior
;NETP=number of Omegas with prior
;Prior information is important for MCMC Bayesian analysis, not necessary for maximization
; methods
; In this example, only the OMEGAs have a prior distribution, the THETAS do not.
; For Bayesian methods, it is most important for at least the OMEGAs to have a prior,
; even an uninformative one, to stabilize the analysis. Only if the number of subjects
; exceeds the OMEGA dimension number by at least 100, then you may get away without
; priors on OMEGA for BAYES analysis.
$PRIOR NWPRI NTHETA=11, NETA=4, NTHP=0, NETP=4, NPEXP=1

$PK
; LCLM=log transformed clearance, male
LCLM=THETA(1)
;LCLF=log transformed clearance, female.
LCLF=THETA(2)
; CLAM=CL age slope, male
CLAM=THETA(3)
; CLAF=CL age slope, female
CLAF=THETA(4)
; LV1M=log transformed V1, male
LV1M=THETA(5)
; LV1F=log transformed V1, female
LV1F=THETA(6)
; V1AM=V1 age slope, male
V1AM=THETA(7)
; V1AF=V1 age slope, female
V1AF=THETA(8)
; LAGE=log transformed age
LAGE=DLOG(AGE)
;Mean of ETA1, the inter-subject deviation of Clearance, is ultimately modeled as linear function
;of THETA(1) to THETA(4).  Relating thetas to Mus by linear functions is not essential for ITS,
;IMP, or IMPMAP methods, but is very helpful for MCMC methods such as SAEM and BAYES.
MU_1=(1.0-GNDR)*(LCLM+LAGE*CLAM) + GNDR*(LCLF+LAGE*CLAF)
;Mean of ETA2, the inter-subject deviation of V1, is ultimately modeled as linear function of
; THETA(5) to THETA(8)
MU_2=(1.0-GNDR)*(LV1M+LAGE*V1AM) + GNDR*(LV1F+LAGE*V1AF)
MU_3=THETA(9)
MU_4=THETA(10)
CL=DEXP(MU_1+ETA(1))
V1=DEXP(MU_2+ETA(2))
Q=DEXP(MU_3+ETA(3))
V2=DEXP(MU_4+ETA(4))
S1=V1

$ERROR
CALLFL=0
; Option to model the residual error coefficient in THETA(11), rather than in SIGMA.
SDSL=THETA(11)
W=F*SDSL
Y = F + W*EPS(1)
IPRED=F
IWRES=(DV-F)/W

;Initial THETAs
$THETA
( 0.7 ) ;[LCLM]
( 0.7 ) ;[LCLF]
( 2 )   ;[CLAM]
( 2.0);[CLAF]
( 0.7 ) ;[LV1M]
( 0.7 ) ;[LV1F]
( 2.0 )   ;[V1AM]
( 2.0 )   ;[V1AF]
( 0.7 ) ;[MU_3]
(  0.7 );[MU_4]
( 0.3 )     ;[SDSL]

;Initial OMEGAs
$OMEGA BLOCK(4)
0.5  ;[p]
0.001  ;[f]
0.5  ;[p]
0.001 ;[f]
0.001 ;[f]
0.5  ;[p]
0.001 ;[f]
0.001 ;[f]
0.001 ;[f]
0.5 ;[p]

; Degrees of freedom to OMEGA prior matrix:
$THETA 4 FIX
; Prior OMEGA matrix
$OMEGA BLOCK(4)
0.01 FIX
0.0  0.01
0.0 0.0 0.01
0.0 0.0 0.0 0.01

;SIGMA is 1.0 fixed, serves as unscaled variance for EPS(1).  THETA(11) takes up the
; residual error scaling.
$SIGMA
(1.0 FIXED)

; Edited original example2.ctl to be SAEM => IMP
; because that is a common pattern
$EST METHOD=SAEM NBURN=3000 NITER=2000 PRINT=10 ISAMPLE=2
     ISAMPLE_M1=1 ISAMPLE_M2=1 ISAMPLE_M3=1
     CTYPE=3 CITER=10 CALPHA=0.05
$EST METHOD=IMP INTERACTION EONLY=1 NITER=5 ISAMPLE=3000 PRINT=1 SIGL=8 SEED=123334
     CTYPE=3 CITER=10 CALPHA=0.05
$COV MATRIX=R UNCONDITIONAL

NM-TRAN MESSAGES
 WARNINGS AND ERRORS (IF ANY) FOR PROBLEM    1
 (WARNING  2) NM-TRAN INFERS THAT THE DATA ARE POPULATION.
 (WARNING  121) INTERACTION IS IMPLIED WITH EM/BAYES ESTIMATION METHODS
 (MU_WARNING 26) DATA ITEM(S) USED IN DEFINITION OF MU_(S) SHOULD BE CONSTANT FOR INDIV. REC.:
  GNDR AGE

1NONLINEAR MIXED EFFECTS MODEL PROGRAM (NONMEM) VERSION 7.4.4
 ORIGINALLY DEVELOPED BY STUART BEAL, LEWIS SHEINER, AND ALISON BOECKMANN
 CURRENT DEVELOPERS ARE ROBERT BAUER, ICON DEVELOPMENT SOLUTIONS,
 AND ALISON BOECKMANN. IMPLEMENTATION, EFFICIENCY, AND STANDARDIZATION
 PERFORMED BY NOUS INFOSYSTEMS.
 PROBLEM NO.:         1
 RUN# example2 (from sampc)
 TOT. NO. OF OBS RECS:     2000
 TOT. NO. OF INDIVIDUALS:      400
 TWO COMPARTMENT MODEL (ADVAN3)
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 #TBLN:      1
 #METH: Stochastic Approximation Expectation-Maximization
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
 #TERM:
 STOCHASTIC PORTION WAS COMPLETED
 REDUCED STOCHASTIC PORTION WAS COMPLETED

 ETABAR IS THE ARITHMETIC MEAN OF THE ETA-ESTIMATES,
 AND THE P-VALUE IS GIVEN FOR THE NULL HYPOTHESIS THAT THE TRUE MEAN IS 0.

 ETABAR:         5.8609E-08 -8.7971E-07 -7.9294E-07 -1.0238E-06
 SE:             4.7120E-03  3.0200E-03  3.4538E-03  3.7936E-03
 N:                     400         400         400         400

 P VAL.:         9.9999E-01  9.9977E-01  9.9982E-01  9.9978E-01

 ETASHRINKSD(%)  7.5208E+00  3.3532E+01  3.9664E+01  2.7527E+01
 ETASHRINKVR(%)  1.4476E+01  5.5820E+01  6.3596E+01  4.7476E+01
 EBVSHRINKSD(%)  7.5403E+00  3.3374E+01  3.9862E+01  2.7588E+01
 EBVSHRINKVR(%)  1.4512E+01  5.5610E+01  6.3834E+01  4.7565E+01
 EPSSHRINKSD(%)  2.7432E+01
 EPSSHRINKVR(%)  4.7338E+01


 TOTAL DATA POINTS NORMALLY DISTRIBUTED (N):         2000
 N*LOG(2PI) CONSTANT TO OBJECTIVE FUNCTION:    3675.7541328186908
 OBJECTIVE FUNCTION VALUE WITHOUT CONSTANT:   -19630.987460351451
 OBJECTIVE FUNCTION VALUE WITH CONSTANT:      -15955.233327532760
 REPORTED OBJECTIVE FUNCTION DOES NOT CONTAIN CONSTANT

 TOTAL EFFECTIVE ETAS (NIND*NETA):                          1600
 NIND*NETA*LOG(2PI) CONSTANT TO OBJECTIVE FUNCTION:    2940.6033062549527
 OBJECTIVE FUNCTION VALUE WITHOUT CONSTANT:   -19630.987460351451
 OBJECTIVE FUNCTION VALUE WITH CONSTANT:      -16690.384154096497
 REPORTED OBJECTIVE FUNCTION DOES NOT CONTAIN CONSTANT

 PRIOR CONSTANT TO OBJECTIVE FUNCTION:    70.363912812525712
 OBJECTIVE FUNCTION VALUE WITHOUT CONSTANT:   -19630.987460351451
 OBJECTIVE FUNCTION VALUE WITH CONSTANT:      -19560.623547538926
 REPORTED OBJECTIVE FUNCTION DOES NOT CONTAIN CONSTANT


 #TERE:
 Elapsed estimation  time in seconds:   130.23
 Elapsed covariance  time in seconds:     0.16

 ********************                STOCHASTIC APPROXIMATION EXPECTATION-MAXIMIZATION               ********************
 #OBJT:**************                        FINAL VALUE OF LIKELIHOOD FUNCTION                      ********************
 #OBJV:********************************************   -19630.987       **************************************************

 ********************                STOCHASTIC APPROXIMATION EXPECTATION-MAXIMIZATION               ********************
 ********************                             FINAL PARAMETER ESTIMATE                           ********************

 THETA - VECTOR OF FIXED EFFECTS PARAMETERS   *********
         TH 1      TH 2      TH 3      TH 4      TH 5      TH 6      TH 7      TH 8      TH 9      TH10      TH11
         3.30E+00  3.25E+00 -6.12E-01 -2.08E-01  7.37E-01  1.14E+00  3.35E-01  1.92E-01  6.92E-01  2.30E+00  9.92E-02

 OMEGA - COV MATRIX FOR RANDOM EFFECTS - ETAS  ********
         ETA1      ETA2      ETA3      ETA4
 ETA1
+        1.04E-02
 ETA2
+        3.20E-04  8.28E-03
 ETA3
+        1.98E-03  8.72E-04  1.31E-02
 ETA4
+       -1.90E-04  1.01E-03  4.04E-03  1.10E-02

 SIGMA - COV MATRIX FOR RANDOM EFFECTS - EPSILONS  ****
         EPS1
 EPS1
+        1.00E+00

 OMEGA - CORR MATRIX FOR RANDOM EFFECTS - ETAS  *******
         ETA1      ETA2      ETA3      ETA4
 ETA1
+        1.02E-01
 ETA2
+        3.44E-02  9.10E-02
 ETA3
+        1.69E-01  8.36E-02  1.15E-01
 ETA4
+       -1.78E-02  1.05E-01  3.36E-01  1.05E-01

 SIGMA - CORR MATRIX FOR RANDOM EFFECTS - EPSILONS  ***
         EPS1
 EPS1
+        1.00E+00

 ********************                STOCHASTIC APPROXIMATION EXPECTATION-MAXIMIZATION               ********************
 ********************                          STANDARD ERROR OF ESTIMATE (S)                        ********************

 THETA - VECTOR OF FIXED EFFECTS PARAMETERS   *********
         TH 1      TH 2      TH 3      TH 4      TH 5      TH 6      TH 7      TH 8      TH 9      TH10      TH11
         3.80E-02  2.89E-02  1.11E-02  8.44E-03  5.02E-02  4.16E-02  1.39E-02  1.20E-02  1.11E-02  9.20E-03  2.93E-03

 OMEGA - COV MATRIX FOR RANDOM EFFECTS - ETAS  ********
         ETA1      ETA2      ETA3      ETA4
 ETA1
+        9.98E-04
 ETA2
+        8.58E-04  1.50E-03
 ETA3
+        1.35E-03  1.42E-03  2.91E-03
 ETA4
+        1.12E-03  1.15E-03  1.97E-03  1.99E-03

 SIGMA - COV MATRIX FOR RANDOM EFFECTS - EPSILONS  ****
         EPS1
 EPS1
+        0.00E+00

 OMEGA - CORR MATRIX FOR RANDOM EFFECTS - ETAS  *******
         ETA1      ETA2      ETA3      ETA4
 ETA1
+        4.89E-03
 ETA2
+        9.08E-02  8.26E-03
 ETA3
+        1.06E-01  1.31E-01  1.27E-02
 ETA4
+        1.06E-01  1.14E-01  1.13E-01  9.51E-03

 SIGMA - CORR MATRIX FOR RANDOM EFFECTS - EPSILONS  ***
         EPS1
 EPS1
+       .........
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 #TBLN:      2
 #METH: Objective Function Evaluation by Importance Sampling
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
 #TERM:
 EXPECTATION ONLY PROCESS COMPLETED

 ETABAR IS THE ARITHMETIC MEAN OF THE ETA-ESTIMATES,
 AND THE P-VALUE IS GIVEN FOR THE NULL HYPOTHESIS THAT THE TRUE MEAN IS 0.

 ETABAR:         4.7468E-05  3.3453E-05 -4.5114E-04 -3.0710E-04
 SE:             4.7229E-03  3.0130E-03  3.3987E-03  3.7813E-03
 N:                     400         400         400         400

 P VAL.:         9.9198E-01  9.9114E-01  8.9440E-01  9.3527E-01

 ETASHRINKSD(%)  7.3072E+00  3.3685E+01  4.0627E+01  2.7761E+01
 ETASHRINKVR(%)  1.4080E+01  5.6024E+01  6.4748E+01  4.7815E+01
 EBVSHRINKSD(%)  7.4883E+00  3.3257E+01  3.9117E+01  2.7275E+01
 EBVSHRINKVR(%)  1.4416E+01  5.5454E+01  6.2933E+01  4.7111E+01
 EPSSHRINKSD(%)  2.7423E+01
 EPSSHRINKVR(%)  4.7325E+01


 TOTAL DATA POINTS NORMALLY DISTRIBUTED (N):         2000
 N*LOG(2PI) CONSTANT TO OBJECTIVE FUNCTION:    3675.7541328186908
 OBJECTIVE FUNCTION VALUE WITHOUT CONSTANT:   -10838.581685831459
 OBJECTIVE FUNCTION VALUE WITH CONSTANT:      -7162.8275530127685
 REPORTED OBJECTIVE FUNCTION DOES NOT CONTAIN CONSTANT

 TOTAL EFFECTIVE ETAS (NIND*NETA):                          1600

 PRIOR CONSTANT TO OBJECTIVE FUNCTION:    70.363912812525712
 OBJECTIVE FUNCTION VALUE WITHOUT CONSTANT:   -10838.581685831459
 OBJECTIVE FUNCTION VALUE WITH CONSTANT:      -10768.217773018934
 REPORTED OBJECTIVE FUNCTION DOES NOT CONTAIN CONSTANT


 #TERE:
 Elapsed estimation  time in seconds:    25.79
 Elapsed covariance  time in seconds:    58.96

 ********************               OBJECTIVE FUNCTION EVALUATION BY IMPORTANCE SAMPLING             ********************
 #OBJT:**************                        FINAL VALUE OF OBJECTIVE FUNCTION                       ********************
 #OBJV:********************************************   -10838.582       **************************************************

 ********************               OBJECTIVE FUNCTION EVALUATION BY IMPORTANCE SAMPLING             ********************
 ********************                             FINAL PARAMETER ESTIMATE                           ********************

 THETA - VECTOR OF FIXED EFFECTS PARAMETERS   *********
         TH 1      TH 2      TH 3      TH 4      TH 5      TH 6      TH 7      TH 8      TH 9      TH10      TH11
         3.30E+00  3.25E+00 -6.12E-01 -2.08E-01  7.37E-01  1.14E+00  3.35E-01  1.92E-01  6.92E-01  2.30E+00  9.92E-02

 OMEGA - COV MATRIX FOR RANDOM EFFECTS - ETAS  ********
         ETA1      ETA2      ETA3      ETA4
 ETA1
+        1.04E-02
 ETA2
+        3.20E-04  8.28E-03
 ETA3
+        1.98E-03  8.72E-04  1.31E-02
 ETA4
+       -1.90E-04  1.01E-03  4.04E-03  1.10E-02

 SIGMA - COV MATRIX FOR RANDOM EFFECTS - EPSILONS  ****
         EPS1
 EPS1
+        1.00E+00

 OMEGA - CORR MATRIX FOR RANDOM EFFECTS - ETAS  *******
         ETA1      ETA2      ETA3      ETA4
 ETA1
+        1.02E-01
 ETA2
+        3.44E-02  9.10E-02
 ETA3
+        1.69E-01  8.36E-02  1.15E-01
 ETA4
+       -1.78E-02  1.05E-01  3.36E-01  1.05E-01

 SIGMA - CORR MATRIX FOR RANDOM EFFECTS - EPSILONS  ***
         EPS1
 EPS1
+        1.00E+00

 ********************               OBJECTIVE FUNCTION EVALUATION BY IMPORTANCE SAMPLING             ********************
 ********************                          STANDARD ERROR OF ESTIMATE (R)                        ********************

 THETA - VECTOR OF FIXED EFFECTS PARAMETERS   *********
         TH 1      TH 2      TH 3      TH 4      TH 5      TH 6      TH 7      TH 8      TH 9      TH10      TH11
         3.27E-02  2.87E-02  9.54E-03  8.32E-03  3.97E-02  3.59E-02  1.15E-02  1.04E-02  1.08E-02  8.73E-03  2.77E-03

 OMEGA - COV MATRIX FOR RANDOM EFFECTS - ETAS  ********
         ETA1      ETA2      ETA3      ETA4
 ETA1
+        9.70E-04
 ETA2
+        8.31E-04  1.36E-03
 ETA3
+        1.35E-03  1.49E-03  3.24E-03
 ETA4
+        1.04E-03  1.14E-03  2.28E-03  2.04E-03

 SIGMA - COV MATRIX FOR RANDOM EFFECTS - EPSILONS  ****
         EPS1
 EPS1
+        0.00E+00

 OMEGA - CORR MATRIX FOR RANDOM EFFECTS - ETAS  *******
         ETA1      ETA2      ETA3      ETA4
 ETA1
+        4.75E-03
 ETA2
+        8.81E-02  7.50E-03
 ETA3
+        1.02E-01  1.38E-01  1.41E-02
 ETA4
+        9.84E-02  1.14E-01  1.30E-01  9.73E-03

 SIGMA - CORR MATRIX FOR RANDOM EFFECTS - EPSILONS  ***
         EPS1
 EPS1
+       .........
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 Elapsed postprocess time in seconds:     0.00
 Elapsed finaloutput time in seconds:     0.00
 #CPUT: Total CPU Time in Seconds,      210.797
