Thu Jul 19 15:13:59 UTC 2018
$PROBLEM RUN# 510 FULL COV MODEL
$INPUT C ID DV AMT II ADDL TIME RATE HT WT CLCR SEX AGE
$DATA  ../poppk_wcovs.csv IGNORE=C
$SUB ADVAN1 TRANS2

$PK
TVCL=THETA(1)*(CLCR/80)**THETA(3)*(AGE/45)**THETA(4)
CL=TVCL*EXP(ETA(1))
TVV=THETA(2)*(WT/70)**THETA(5)*(AGE/45)**THETA(6)
V=TVV*EXP(ETA(2))
S1=V
$ERROR
Y=F + F*ERR(1)
IPRED=F

$THETA
 (0, 13) ;[L/day] CL
 (0, 75) ;[L] V
 (0.001 );[L/day] CL_{CLCR}
 (0.001) ;[L/day] CL_{AGE}
 (0.001) ;[L] V_{WT}
 (0.001) ;[L] V_{AGE}

$OMEGA BLOCK(2)
(0.04) ;[P] CL
(0.02) ;[R] CL-V
(0.04) ;[P] V

$SIGMA
0.04 ;[P] Residual

;$MSFI=./401.msf
$EST METH=ITS INTERACTION PRINT=5 NITER=20 SIG=3 NOABORT MSFO=./510.msf
$EST METH=1 INTERACTION PRINT=5 MAX=9999 SIG=3 NOABORT MSFO=./510.msf
$EST METH=IMP INTERACTION PRINT=1 NITER=200 EONLY=0 NOABORT SIGL=9 CTYPE=3 MSFO=./510.msf
$EST METH=IMP INTERACTION PRINT=1 NITER=10 ISAMPLE=2000 EONLY=1 NOABORT SIGL=9 MSFO=./510.msf
$COV
$TABLE NOPRINT ONEHEADER FILE=./510.tab
 ID TIME IPRED EVID ETA1 ETA2
$TABLE NOPRINT ONEHEADER FILE=./510par.tab
 ID TIME ETA1 ETA2 HT WT CLCR SEX AGE EVID

NM-TRAN MESSAGES
 WARNINGS AND ERRORS (IF ANY) FOR PROBLEM    1
 (WARNING  2) NM-TRAN INFERS THAT THE DATA ARE POPULATION.

1NONLINEAR MIXED EFFECTS MODEL PROGRAM (NONMEM) VERSION 7.4.1
 ORIGINALLY DEVELOPED BY STUART BEAL, LEWIS SHEINER, AND ALISON BOECKMANN
 CURRENT DEVELOPERS ARE ROBERT BAUER, ICON DEVELOPMENT SOLUTIONS,
 AND ALISON BOECKMANN. IMPLEMENTATION, EFFICIENCY, AND STANDARDIZATION
 PERFORMED BY NOUS INFOSYSTEMS.
 PROBLEM NO.:         1
 RUN# 510 FULL COV MODEL
 TOT. NO. OF OBS RECS:      560
 TOT. NO. OF INDIVIDUALS:       40
 ONE COMPARTMENT MODEL (ADVAN1)
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 #TBLN:      1
 #METH: Iterative Two Stage
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
 #TERM:
 OPTIMIZATION WAS NOT TESTED FOR CONVERGENCE

 ETABAR IS THE ARITHMETIC MEAN OF THE ETA-ESTIMATES,
 AND THE P-VALUE IS GIVEN FOR THE NULL HYPOTHESIS THAT THE TRUE MEAN IS 0.

 ETABAR:         2.6090E-02 -2.5365E-02
 SE:             3.4178E-02  3.3971E-02
 N:                      40          40

 P VAL.:         4.4524E-01  4.5526E-01

 ETASHRINKSD(%)  4.1389E+00  5.9853E+00
 ETASHRINKVR(%)  8.1066E+00  1.1612E+01
 EBVSHRINKSD(%)  3.0374E+00  6.5614E+00
 EBVSHRINKVR(%)  5.9825E+00  1.2692E+01
 EPSSHRINKSD(%)  7.2354E+00
 EPSSHRINKVR(%)  1.3947E+01


 TOTAL DATA POINTS NORMALLY DISTRIBUTED (N):          560
 N*LOG(2PI) CONSTANT TO OBJECTIVE FUNCTION:    1029.21115718923
 OBJECTIVE FUNCTION VALUE WITHOUT CONSTANT:    362.247036161216
 OBJECTIVE FUNCTION VALUE WITH CONSTANT:       1391.45819335045
 REPORTED OBJECTIVE FUNCTION DOES NOT CONTAIN CONSTANT

 TOTAL EFFECTIVE ETAS (NIND*NETA):                            80


 #TERE:
 Elapsed estimation  time in seconds:     2.57
 Elapsed covariance  time in seconds:     0.01

 ********************                               ITERATIVE TWO STAGE                              ********************
 #OBJT:**************                        FINAL VALUE OF OBJECTIVE FUNCTION                       ********************
 #OBJV:********************************************      362.247       **************************************************

 ********************                               ITERATIVE TWO STAGE                              ********************
 ********************                             FINAL PARAMETER ESTIMATE                           ********************

 THETA - VECTOR OF FIXED EFFECTS PARAMETERS   *********
         TH 1      TH 2      TH 3      TH 4      TH 5      TH 6
         1.22E+01  9.29E+01  2.17E-01  9.00E-02  2.90E-01 -1.13E+00

 OMEGA - COV MATRIX FOR RANDOM EFFECTS - ETAS  ********
         ETA1      ETA2
 ETA1
+        5.21E-02
 ETA2
+        3.59E-03  5.36E-02

 SIGMA - COV MATRIX FOR RANDOM EFFECTS - EPSILONS  ****
         EPS1
 EPS1
+        4.66E-02

 OMEGA - CORR MATRIX FOR RANDOM EFFECTS - ETAS  *******
         ETA1      ETA2
 ETA1
+        2.28E-01
 ETA2
+        6.78E-02  2.31E-01

 SIGMA - CORR MATRIX FOR RANDOM EFFECTS - EPSILONS  ***
         EPS1
 EPS1
+        2.16E-01

 ********************                               ITERATIVE TWO STAGE                              ********************
 ********************                          STANDARD ERROR OF ESTIMATE (S)                        ********************

 THETA - VECTOR OF FIXED EFFECTS PARAMETERS   *********
         TH 1      TH 2      TH 3      TH 4      TH 5      TH 6
         6.98E-01  5.03E+00  9.37E-02  1.02E+00  2.08E-01  9.57E-01

 OMEGA - COV MATRIX FOR RANDOM EFFECTS - ETAS  ********
         ETA1      ETA2
 ETA1
+        1.81E-02
 ETA2
+        1.48E-02  2.25E-02

 SIGMA - COV MATRIX FOR RANDOM EFFECTS - EPSILONS  ****
         EPS1
 EPS1
+        3.04E-03

 OMEGA - CORR MATRIX FOR RANDOM EFFECTS - ETAS  *******
         ETA1      ETA2
 ETA1
+        3.96E-02
 ETA2
+        2.82E-01  4.86E-02

 SIGMA - CORR MATRIX FOR RANDOM EFFECTS - EPSILONS  ***
         EPS1
 EPS1
+        7.03E-03

 ********************                               ITERATIVE TWO STAGE                              ********************
 ********************                        COVARIANCE MATRIX OF ESTIMATE (S)                       ********************

            TH 1      TH 2      TH 3      TH 4      TH 5      TH 6      OM11      OM12      OM22      SG11
 TH 1
+        4.87E-01
 TH 2
+       -4.01E-01  2.53E+01
 TH 3
+        3.65E-02 -4.60E-02  8.77E-03
 TH 4
+       -2.03E-01  6.87E-01 -4.21E-03  1.04E+00
 TH 5
+       -1.87E-02  4.41E-01 -8.46E-04  3.74E-02  4.33E-02
 TH 6
+        4.05E-02 -1.96E+00  7.56E-03  1.80E-01  3.34E-02  9.16E-01
 OM11
+        2.84E-03 -1.08E-02 -5.98E-05 -1.07E-02 -2.44E-04 -1.63E-03  3.27E-04
 OM12
+        2.05E-03 -1.46E-02  3.28E-05 -1.46E-04 -6.90E-04  3.82E-03  3.22E-05  2.19E-04
 OM22
+       -3.84E-04  2.53E-02 -2.87E-04  2.37E-03 -2.16E-05 -1.39E-02  5.31E-05 -6.17E-05  5.06E-04
 SG11
+       -5.87E-04  2.01E-03  3.17E-05  6.14E-04 -5.16E-05 -9.30E-05 -2.91E-05  4.08E-06 -8.84E-06  9.23E-06

 ********************                               ITERATIVE TWO STAGE                              ********************
 ********************                        CORRELATION MATRIX OF ESTIMATE (S)                      ********************

            TH 1      TH 2      TH 3      TH 4      TH 5      TH 6      OM11      OM12      OM22      SG11
 TH 1
+        6.98E-01
 TH 2
+       -1.14E-01  5.03E+00
 TH 3
+        5.58E-01 -9.78E-02  9.37E-02
 TH 4
+       -2.85E-01  1.34E-01 -4.40E-02  1.02E+00
 TH 5
+       -1.29E-01  4.22E-01 -4.34E-02  1.76E-01  2.08E-01
 TH 6
+        6.06E-02 -4.06E-01  8.43E-02  1.84E-01  1.68E-01  9.57E-01
 OM11
+        2.25E-01 -1.18E-01 -3.53E-02 -5.76E-01 -6.48E-02 -9.41E-02  1.81E-02
 OM12
+        1.98E-01 -1.96E-01  2.37E-02 -9.66E-03 -2.24E-01  2.70E-01  1.20E-01  1.48E-02
 OM22
+       -2.45E-02  2.23E-01 -1.36E-01  1.03E-01 -4.61E-03 -6.45E-01  1.31E-01 -1.85E-01  2.25E-02
 SG11
+       -2.77E-01  1.31E-01  1.12E-01  1.98E-01 -8.15E-02 -3.20E-02 -5.30E-01  9.08E-02 -1.29E-01  3.04E-03
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 #TBLN:      2
 #METH: First Order Conditional Estimation with Interaction
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
 #TERM:
0MINIMIZATION SUCCESSFUL
 NO. OF FUNCTION EVALUATIONS USED:      283
 NO. OF SIG. DIGITS IN FINAL EST.:  3.0

 ETABAR IS THE ARITHMETIC MEAN OF THE ETA-ESTIMATES,
 AND THE P-VALUE IS GIVEN FOR THE NULL HYPOTHESIS THAT THE TRUE MEAN IS 0.

 ETABAR:        -7.9068E-04 -2.8020E-03
 SE:             3.3949E-02  3.3178E-02
 N:                      40          40

 P VAL.:         9.8142E-01  9.3269E-01

 ETASHRINKSD(%)  2.0105E+00  5.6521E+00
 ETASHRINKVR(%)  3.9805E+00  1.0985E+01
 EBVSHRINKSD(%)  3.1290E+00  6.7347E+00
 EBVSHRINKVR(%)  6.1601E+00  1.3016E+01
 EPSSHRINKSD(%)  6.1015E+00
 EPSSHRINKVR(%)  1.1831E+01


 TOTAL DATA POINTS NORMALLY DISTRIBUTED (N):          560
 N*LOG(2PI) CONSTANT TO OBJECTIVE FUNCTION:    1029.21115718923
 OBJECTIVE FUNCTION VALUE WITHOUT CONSTANT:    359.013325510229
 OBJECTIVE FUNCTION VALUE WITH CONSTANT:       1388.22448269946
 REPORTED OBJECTIVE FUNCTION DOES NOT CONTAIN CONSTANT

 TOTAL EFFECTIVE ETAS (NIND*NETA):                            80


 #TERE:
 Elapsed estimation  time in seconds:     2.27

 ********************               FIRST ORDER CONDITIONAL ESTIMATION WITH INTERACTION              ********************
 #OBJT:**************                       MINIMUM VALUE OF OBJECTIVE FUNCTION                      ********************
 #OBJV:********************************************      359.013       **************************************************

 ********************               FIRST ORDER CONDITIONAL ESTIMATION WITH INTERACTION              ********************
 ********************                             FINAL PARAMETER ESTIMATE                           ********************

 THETA - VECTOR OF FIXED EFFECTS PARAMETERS   *********
         TH 1      TH 2      TH 3      TH 4      TH 5      TH 6
         1.25E+01  9.17E+01  2.16E-01  5.51E-01  4.07E-01 -4.55E-01

 OMEGA - COV MATRIX FOR RANDOM EFFECTS - ETAS  ********
         ETA1      ETA2
 ETA1
+        4.92E-02
 ETA2
+        3.53E-03  5.07E-02

 SIGMA - COV MATRIX FOR RANDOM EFFECTS - EPSILONS  ****
         EPS1
 EPS1
+        4.54E-02

 OMEGA - CORR MATRIX FOR RANDOM EFFECTS - ETAS  *******
         ETA1      ETA2
 ETA1
+        2.22E-01
 ETA2
+        7.06E-02  2.25E-01

 SIGMA - CORR MATRIX FOR RANDOM EFFECTS - EPSILONS  ***
         EPS1
 EPS1
+        2.13E-01
 #TBLN:      3
 #METH: Importance Sampling
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
 #TERM:
 OPTIMIZATION WAS COMPLETED

 ETABAR IS THE ARITHMETIC MEAN OF THE ETA-ESTIMATES,
 AND THE P-VALUE IS GIVEN FOR THE NULL HYPOTHESIS THAT THE TRUE MEAN IS 0.

 ETABAR:        -8.3667E-03  1.2001E-02
 SE:             3.4319E-02  3.3437E-02
 N:                      40          40

 P VAL.:         8.0739E-01  7.1965E-01

 ETASHRINKSD(%)  3.3319E+00  7.6311E+00
 ETASHRINKVR(%)  6.5529E+00  1.4680E+01
 EBVSHRINKSD(%)  3.1044E+00  7.2965E+00
 EBVSHRINKVR(%)  6.1124E+00  1.4061E+01
 EPSSHRINKSD(%)  6.5483E+00
 EPSSHRINKVR(%)  1.2668E+01


 TOTAL DATA POINTS NORMALLY DISTRIBUTED (N):          560
 N*LOG(2PI) CONSTANT TO OBJECTIVE FUNCTION:    1029.21115718923
 OBJECTIVE FUNCTION VALUE WITHOUT CONSTANT:    352.384942789644
 OBJECTIVE FUNCTION VALUE WITH CONSTANT:       1381.59609997888
 REPORTED OBJECTIVE FUNCTION DOES NOT CONTAIN CONSTANT

 TOTAL EFFECTIVE ETAS (NIND*NETA):                            80


 #TERE:
 Elapsed estimation  time in seconds:    16.55
 Elapsed covariance  time in seconds:    21.41

 ********************                               IMPORTANCE SAMPLING                              ********************
 #OBJT:**************                        FINAL VALUE OF OBJECTIVE FUNCTION                       ********************
 #OBJV:********************************************      352.385       **************************************************

 ********************                               IMPORTANCE SAMPLING                              ********************
 ********************                             FINAL PARAMETER ESTIMATE                           ********************

 THETA - VECTOR OF FIXED EFFECTS PARAMETERS   *********
         TH 1      TH 2      TH 3      TH 4      TH 5      TH 6
         1.23E+01  9.07E+01  1.63E-01  5.67E-01  4.03E-01 -3.95E-01

 OMEGA - COV MATRIX FOR RANDOM EFFECTS - ETAS  ********
         ETA1      ETA2
 ETA1
+        5.17E-02
 ETA2
+        3.45E-03  5.38E-02

 SIGMA - COV MATRIX FOR RANDOM EFFECTS - EPSILONS  ****
         EPS1
 EPS1
+        4.50E-02

 OMEGA - CORR MATRIX FOR RANDOM EFFECTS - ETAS  *******
         ETA1      ETA2
 ETA1
+        2.27E-01
 ETA2
+        6.54E-02  2.32E-01

 SIGMA - CORR MATRIX FOR RANDOM EFFECTS - EPSILONS  ***
         EPS1
 EPS1
+        2.12E-01

 ********************                               IMPORTANCE SAMPLING                              ********************
 ********************                         STANDARD ERROR OF ESTIMATE (RSR)                       ********************

 THETA - VECTOR OF FIXED EFFECTS PARAMETERS   *********
         TH 1      TH 2      TH 3      TH 4      TH 5      TH 6
         1.02E+00  4.21E+00  1.72E-01  3.36E-01  1.81E-01  6.04E-01

 OMEGA - COV MATRIX FOR RANDOM EFFECTS - ETAS  ********
         ETA1      ETA2
 ETA1
+        1.22E-02
 ETA2
+        7.13E-03  1.35E-02

 SIGMA - COV MATRIX FOR RANDOM EFFECTS - EPSILONS  ****
         EPS1
 EPS1
+        3.92E-03

 OMEGA - CORR MATRIX FOR RANDOM EFFECTS - ETAS  *******
         ETA1      ETA2
 ETA1
+        2.68E-02
 ETA2
+        1.33E-01  2.91E-02

 SIGMA - CORR MATRIX FOR RANDOM EFFECTS - EPSILONS  ***
         EPS1
 EPS1
+        9.25E-03

 ********************                               IMPORTANCE SAMPLING                              ********************
 ********************                       COVARIANCE MATRIX OF ESTIMATE (RSR)                      ********************

            TH 1      TH 2      TH 3      TH 4      TH 5      TH 6      OM11      OM12      OM22      SG11
 TH 1
+        1.04E+00
 TH 2
+        3.45E+00  1.77E+01
 TH 3
+        1.59E-01  5.21E-01  2.97E-02
 TH 4
+       -1.09E-01 -3.19E-01 -2.22E-02  1.13E-01
 TH 5
+        1.56E-01  5.48E-01  2.98E-02 -2.62E-02  3.26E-02
 TH 6
+       -2.00E-01 -1.79E-01 -2.97E-02  1.63E-01 -4.08E-02  3.65E-01
 OM11
+        8.70E-04  4.51E-03  1.86E-04  6.07E-04  2.10E-04  3.26E-04  1.49E-04
 OM12
+       -4.23E-04 -3.34E-03  2.61E-05 -7.53E-04  6.76E-05 -1.08E-03  5.17E-06  5.09E-05
 OM22
+        2.35E-03  1.30E-02  6.19E-04  1.67E-04  4.04E-04  2.98E-03 -2.84E-05  2.25E-05  1.82E-04
 SG11
+        3.31E-04  1.35E-03 -7.71E-05  2.80E-04 -6.22E-05  1.78E-04  1.56E-05 -3.84E-06 -7.59E-06  1.54E-05

 ********************                               IMPORTANCE SAMPLING                              ********************
 ********************                       CORRELATION MATRIX OF ESTIMATE (RSR)                     ********************

            TH 1      TH 2      TH 3      TH 4      TH 5      TH 6      OM11      OM12      OM22      SG11
 TH 1
+        1.02E+00
 TH 2
+        8.03E-01  4.21E+00
 TH 3
+        9.06E-01  7.18E-01  1.72E-01
 TH 4
+       -3.18E-01 -2.25E-01 -3.83E-01  3.36E-01
 TH 5
+        8.46E-01  7.20E-01  9.56E-01 -4.31E-01  1.81E-01
 TH 6
+       -3.25E-01 -7.04E-02 -2.85E-01  8.04E-01 -3.74E-01  6.04E-01
 OM11
+        6.99E-02  8.78E-02  8.84E-02  1.48E-01  9.55E-02  4.42E-02  1.22E-02
 OM12
+       -5.82E-02 -1.11E-01  2.12E-02 -3.14E-01  5.25E-02 -2.49E-01  5.94E-02  7.13E-03
 OM22
+        1.71E-01  2.29E-01  2.66E-01  3.68E-02  1.65E-01  3.65E-01 -1.72E-01  2.34E-01  1.35E-02
 SG11
+        8.27E-02  8.14E-02 -1.14E-01  2.12E-01 -8.78E-02  7.52E-02  3.26E-01 -1.37E-01 -1.43E-01  3.92E-03
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 #TBLN:      4
 #METH: Objective Function Evaluation by Importance Sampling
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
 #TERM:
 EXPECTATION ONLY PROCESS COMPLETED

 ETABAR IS THE ARITHMETIC MEAN OF THE ETA-ESTIMATES,
 AND THE P-VALUE IS GIVEN FOR THE NULL HYPOTHESIS THAT THE TRUE MEAN IS 0.

 ETABAR:        -8.4214E-03  1.1485E-02
 SE:             3.4259E-02  3.3467E-02
 N:                      40          40

 P VAL.:         8.0583E-01  7.3147E-01

 ETASHRINKSD(%)  3.5010E+00  7.5483E+00
 ETASHRINKVR(%)  6.8794E+00  1.4527E+01
 EBVSHRINKSD(%)  3.0747E+00  7.2567E+00
 EBVSHRINKVR(%)  6.0548E+00  1.3987E+01
 EPSSHRINKSD(%)  6.5788E+00
 EPSSHRINKVR(%)  1.2725E+01


 TOTAL DATA POINTS NORMALLY DISTRIBUTED (N):          560
 N*LOG(2PI) CONSTANT TO OBJECTIVE FUNCTION:    1029.21115718923
 OBJECTIVE FUNCTION VALUE WITHOUT CONSTANT:    351.948135810916
 OBJECTIVE FUNCTION VALUE WITH CONSTANT:       1381.15929300015
 REPORTED OBJECTIVE FUNCTION DOES NOT CONTAIN CONSTANT

 TOTAL EFFECTIVE ETAS (NIND*NETA):                            80


 #TERE:
 Elapsed estimation  time in seconds:    11.10
 Elapsed covariance  time in seconds:   143.85

 ********************               OBJECTIVE FUNCTION EVALUATION BY IMPORTANCE SAMPLING             ********************
 #OBJT:**************                        FINAL VALUE OF OBJECTIVE FUNCTION                       ********************
 #OBJV:********************************************      351.948       **************************************************

 ********************               OBJECTIVE FUNCTION EVALUATION BY IMPORTANCE SAMPLING             ********************
 ********************                             FINAL PARAMETER ESTIMATE                           ********************

 THETA - VECTOR OF FIXED EFFECTS PARAMETERS   *********
         TH 1      TH 2      TH 3      TH 4      TH 5      TH 6
         1.23E+01  9.07E+01  1.63E-01  5.67E-01  4.03E-01 -3.95E-01

 OMEGA - COV MATRIX FOR RANDOM EFFECTS - ETAS  ********
         ETA1      ETA2
 ETA1
+        5.17E-02
 ETA2
+        3.45E-03  5.38E-02

 SIGMA - COV MATRIX FOR RANDOM EFFECTS - EPSILONS  ****
         EPS1
 EPS1
+        4.50E-02

 OMEGA - CORR MATRIX FOR RANDOM EFFECTS - ETAS  *******
         ETA1      ETA2
 ETA1
+        2.27E-01
 ETA2
+        6.54E-02  2.32E-01

 SIGMA - CORR MATRIX FOR RANDOM EFFECTS - EPSILONS  ***
         EPS1
 EPS1
+        2.12E-01

 ********************               OBJECTIVE FUNCTION EVALUATION BY IMPORTANCE SAMPLING             ********************
 ********************                         STANDARD ERROR OF ESTIMATE (RSR)                       ********************

 THETA - VECTOR OF FIXED EFFECTS PARAMETERS   *********
         TH 1      TH 2      TH 3      TH 4      TH 5      TH 6
         9.61E-01  4.94E+00  3.35E-01  1.57E+00  3.42E-01  2.32E+00

 OMEGA - COV MATRIX FOR RANDOM EFFECTS - ETAS  ********
         ETA1      ETA2
 ETA1
+        1.22E-02
 ETA2
+        9.46E-03  1.20E-02

 SIGMA - COV MATRIX FOR RANDOM EFFECTS - EPSILONS  ****
         EPS1
 EPS1
+        3.88E-03

 OMEGA - CORR MATRIX FOR RANDOM EFFECTS - ETAS  *******
         ETA1      ETA2
 ETA1
+        2.69E-02
 ETA2
+        1.78E-01  2.59E-02

 SIGMA - CORR MATRIX FOR RANDOM EFFECTS - EPSILONS  ***
         EPS1
 EPS1
+        9.14E-03

 ********************               OBJECTIVE FUNCTION EVALUATION BY IMPORTANCE SAMPLING             ********************
 ********************                       COVARIANCE MATRIX OF ESTIMATE (RSR)                      ********************

            TH 1      TH 2      TH 3      TH 4      TH 5      TH 6      OM11      OM12      OM22      SG11
 TH 1
+        9.24E-01
 TH 2
+       -5.78E-01  2.44E+01
 TH 3
+        2.75E-01 -1.50E-01  1.12E-01
 TH 4
+        9.69E-01 -2.59E-01  4.56E-01  2.47E+00
 TH 5
+       -2.30E-01  7.54E-01 -9.21E-02 -4.54E-01  1.17E-01
 TH 6
+       -1.40E+00 -3.76E-01 -6.64E-01 -3.35E+00  6.27E-01  5.39E+00
 OM11
+        2.66E-05  1.02E-02  3.41E-04  5.36E-03 -3.97E-04 -5.01E-03  1.50E-04
 OM12
+        4.41E-03 -5.81E-03  2.04E-03  8.93E-03 -1.87E-03 -1.53E-02  1.51E-05  8.94E-05
 OM22
+        1.73E-04 -5.23E-03  4.18E-05 -3.39E-03  2.27E-04  6.91E-03 -3.06E-05  1.09E-05  1.44E-04
 SG11
+        3.54E-04 -3.15E-04 -2.02E-04 -4.32E-04  8.26E-05  1.14E-03  1.70E-05 -6.36E-06 -8.18E-06  1.50E-05

 ********************               OBJECTIVE FUNCTION EVALUATION BY IMPORTANCE SAMPLING             ********************
 ********************                       CORRELATION MATRIX OF ESTIMATE (RSR)                     ********************

            TH 1      TH 2      TH 3      TH 4      TH 5      TH 6      OM11      OM12      OM22      SG11
 TH 1
+        9.61E-01
 TH 2
+       -1.22E-01  4.94E+00
 TH 3
+        8.55E-01 -9.05E-02  3.35E-01
 TH 4
+        6.42E-01 -3.35E-02  8.65E-01  1.57E+00
 TH 5
+       -7.00E-01  4.47E-01 -8.04E-01 -8.46E-01  3.42E-01
 TH 6
+       -6.26E-01 -3.28E-02 -8.53E-01 -9.20E-01  7.90E-01  2.32E+00
 OM11
+        2.27E-03  1.70E-01  8.31E-02  2.79E-01 -9.50E-02 -1.77E-01  1.22E-02
 OM12
+        4.85E-01 -1.25E-01  6.45E-01  6.01E-01 -5.77E-01 -6.98E-01  1.31E-01  9.46E-03
 OM22
+        1.50E-02 -8.82E-02  1.04E-02 -1.80E-01  5.52E-02  2.48E-01 -2.08E-01  9.64E-02  1.20E-02
 SG11
+        9.49E-02 -1.65E-02 -1.55E-01 -7.09E-02  6.24E-02  1.26E-01  3.58E-01 -1.73E-01 -1.76E-01  3.88E-03
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 Elapsed postprocess time in seconds:     0.03
 Elapsed finaloutput time in seconds:     0.09
 #CPUT: Total CPU Time in Seconds,      197.373
