Thu Jul 19 17:42:18 UTC 2018
$PROBLEM RUN# 510_fixed FIXED FULL COV MODEL
$INPUT C ID DV AMT II ADDL TIME RATE HT WT CLCR SEX AGE
$DATA  ../poppk_wcovs.csv IGNORE=C
$SUB ADVAN1 TRANS2

$PK
TVCL=THETA(1)*(CLCR/80)**THETA(3)*(AGE/45)**THETA(4)
CL=TVCL*EXP(ETA(1))
TVV=THETA(2)*(WT/70)**THETA(5)*(AGE/45)**THETA(6)
V=TVV*EXP(ETA(2))
S1=V
$ERROR
Y=F + F*ERR(1)
IPRED=F

$THETA
 12.2 FIX ;[L/day] CL
 92.9 FIXED ;[L] V
 (0.001 );[L/day] CL_{CLCR}
 (0.001) ;[L/day] CL_{AGE}
 (0.001) ;[L] V_{WT}
 (0.001) ;[L] V_{AGE}

$OMEGA BLOCK(1)
.005 FIX ;[P] CL
$OMEGA BLOCK SAME ;[P] CL-IOV

$SIGMA
0.04 ;[P] Residual

;$MSFI=./401.msf
$EST METH=1 INTERACTION PRINT=5 MAX=9999 SIG=3 NOABORT MSFO=./510_fixed.msf
$COV
$TABLE NOPRINT ONEHEADER FILE=./510_fixed.tab
 ID TIME IPRED EVID ETA1 ETA2
$TABLE NOPRINT ONEHEADER FILE=./510_fixedpar.tab
 ID TIME ETA1 ETA2 HT WT CLCR SEX AGE EVID

NM-TRAN MESSAGES
 WARNINGS AND ERRORS (IF ANY) FOR PROBLEM    1
 (WARNING  2) NM-TRAN INFERS THAT THE DATA ARE POPULATION.

1NONLINEAR MIXED EFFECTS MODEL PROGRAM (NONMEM) VERSION 7.4.1
 ORIGINALLY DEVELOPED BY STUART BEAL, LEWIS SHEINER, AND ALISON BOECKMANN
 CURRENT DEVELOPERS ARE ROBERT BAUER, ICON DEVELOPMENT SOLUTIONS,
 AND ALISON BOECKMANN. IMPLEMENTATION, EFFICIENCY, AND STANDARDIZATION
 PERFORMED BY NOUS INFOSYSTEMS.
 PROBLEM NO.:         1
 RUN# 510_fixed FIXED FULL COV MODEL
 TOT. NO. OF OBS RECS:      560
 TOT. NO. OF INDIVIDUALS:       40
 ONE COMPARTMENT MODEL (ADVAN1)
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 #TBLN:      1
 #METH: First Order Conditional Estimation with Interaction
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
 #TERM:
0MINIMIZATION SUCCESSFUL
 NO. OF FUNCTION EVALUATIONS USED:      266
 NO. OF SIG. DIGITS IN FINAL EST.:  3.8

 ETABAR IS THE ARITHMETIC MEAN OF THE ETA-ESTIMATES,
 AND THE P-VALUE IS GIVEN FOR THE NULL HYPOTHESIS THAT THE TRUE MEAN IS 0.

 ETABAR:         1.4744E-02 -1.3462E-02
 SE:             2.5799E-02  1.7490E-02
 N:                      40          40

 P VAL.:         5.6765E-01  4.4148E-01

 ETASHRINKSD(%)  1.0000E-10  1.0000E-10
 ETASHRINKVR(%)  1.0000E-10  1.0000E-10
 EBVSHRINKSD(%)  1.6583E+01  3.3237E+01
 EBVSHRINKVR(%)  3.0416E+01  5.5428E+01
 EPSSHRINKSD(%)  3.7040E+00
 EPSSHRINKVR(%)  7.2708E+00


 TOTAL DATA POINTS NORMALLY DISTRIBUTED (N):          560
 N*LOG(2PI) CONSTANT TO OBJECTIVE FUNCTION:    1029.21115718923
 OBJECTIVE FUNCTION VALUE WITHOUT CONSTANT:    616.686660880650
 OBJECTIVE FUNCTION VALUE WITH CONSTANT:       1645.89781806988
 REPORTED OBJECTIVE FUNCTION DOES NOT CONTAIN CONSTANT

 TOTAL EFFECTIVE ETAS (NIND*NETA):                            80


 #TERE:
 Elapsed estimation  time in seconds:     2.28
 Elapsed covariance  time in seconds:     1.01
 Elapsed postprocess time in seconds:     0.03

 ********************               FIRST ORDER CONDITIONAL ESTIMATION WITH INTERACTION              ********************
 #OBJT:**************                       MINIMUM VALUE OF OBJECTIVE FUNCTION                      ********************
 #OBJV:********************************************      616.687       **************************************************

 ********************               FIRST ORDER CONDITIONAL ESTIMATION WITH INTERACTION              ********************
 ********************                             FINAL PARAMETER ESTIMATE                           ********************

 THETA - VECTOR OF FIXED EFFECTS PARAMETERS   *********
         TH 1      TH 2      TH 3      TH 4      TH 5      TH 6
         1.22E+01  9.29E+01  1.99E-01  5.55E-01  4.49E-01 -6.12E-01

 OMEGA - COV MATRIX FOR RANDOM EFFECTS - ETAS  ********
         ETA1      ETA2
 ETA1
+        5.00E-03
 ETA2
+        0.00E+00  5.00E-03

 SIGMA - COV MATRIX FOR RANDOM EFFECTS - EPSILONS  ****
         EPS1
 EPS1
+        5.72E-02

 OMEGA - CORR MATRIX FOR RANDOM EFFECTS - ETAS  *******
         ETA1      ETA2
 ETA1
+        7.07E-02
 ETA2
+        0.00E+00  7.07E-02

 SIGMA - CORR MATRIX FOR RANDOM EFFECTS - EPSILONS  ***
         EPS1
 EPS1
+        2.39E-01

 ********************               FIRST ORDER CONDITIONAL ESTIMATION WITH INTERACTION              ********************
 ********************                            STANDARD ERROR OF ESTIMATE                          ********************

 THETA - VECTOR OF FIXED EFFECTS PARAMETERS   *********
         TH 1      TH 2      TH 3      TH 4      TH 5      TH 6
        ......... .........  8.22E-02  4.95E-01  1.22E-01  7.03E-01

 OMEGA - COV MATRIX FOR RANDOM EFFECTS - ETAS  ********
         ETA1      ETA2
 ETA1
+       .........
 ETA2
+       ......... .........

 SIGMA - COV MATRIX FOR RANDOM EFFECTS - EPSILONS  ****
         EPS1
 EPS1
+        5.55E-03

 OMEGA - CORR MATRIX FOR RANDOM EFFECTS - ETAS  *******
         ETA1      ETA2
 ETA1
+       .........
 ETA2
+       ......... .........

 SIGMA - CORR MATRIX FOR RANDOM EFFECTS - EPSILONS  ***
         EPS1
 EPS1
+        1.16E-02

 ********************               FIRST ORDER CONDITIONAL ESTIMATION WITH INTERACTION              ********************
 ********************                          COVARIANCE MATRIX OF ESTIMATE                         ********************

            TH 1      TH 2      TH 3      TH 4      TH 5      TH 6      OM11      OM12      OM22      SG11
 TH 1
+       .........
 TH 2
+       ......... .........
 TH 3
+       ......... .........  6.76E-03
 TH 4
+       ......... ......... -1.05E-03  2.45E-01
 TH 5
+       ......... .........  2.70E-03 -9.21E-03  1.49E-02
 TH 6
+       ......... .........  6.08E-04  3.57E-02 -1.91E-02  4.94E-01
 OM11
+       ......... ......... ......... ......... ......... ......... .........
 OM12
+       ......... ......... ......... ......... ......... ......... ......... .........
 OM22
+       ......... ......... ......... ......... ......... ......... ......... ......... .........
 SG11
+       ......... ......... -1.32E-04  7.09E-04 -7.93E-05  5.85E-04 ......... ......... .........  3.08E-05

 ********************               FIRST ORDER CONDITIONAL ESTIMATION WITH INTERACTION              ********************
 ********************                          CORRELATION MATRIX OF ESTIMATE                        ********************

            TH 1      TH 2      TH 3      TH 4      TH 5      TH 6      OM11      OM12      OM22      SG11
 TH 1
+       .........
 TH 2
+       ......... .........
 TH 3
+       ......... .........  8.22E-02
 TH 4
+       ......... ......... -2.58E-02  4.95E-01
 TH 5
+       ......... .........  2.70E-01 -1.52E-01  1.22E-01
 TH 6
+       ......... .........  1.05E-02  1.02E-01 -2.22E-01  7.03E-01
 OM11
+       ......... ......... ......... ......... ......... ......... .........
 OM12
+       ......... ......... ......... ......... ......... ......... ......... .........
 OM22
+       ......... ......... ......... ......... ......... ......... ......... ......... .........
 SG11
+       ......... ......... -2.89E-01  2.58E-01 -1.17E-01  1.50E-01 ......... ......... .........  5.55E-03
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 Elapsed finaloutput time in seconds:     0.11
 #CPUT: Total CPU Time in Seconds,        3.253
