Mon Sep 17 13:46:00 UTC 2018
$PROB RUN# 101 - fit of Phase I data - full model
$INPUT C ID SUBJ TIME SEQ CMT EVID AMT DV AGE WT CRCL ALB BMI AAG
       SCR AST ALT HT CP TAFD TAD LDOS MDV BLQ PHASE
$DATA ../analysis1.csv IGNORE=(C='C', BLQ=1)
$SUB ADVAN13 TOL=9

$MODEL
 COMP=(COMP1,DEFDOSE)
 COMP=(COMP2,DEFOBS)
 COMP=(COMP3)

$PK

;log transformed PK parms

  V2WT  = LOG(WT/70)
  CLWT = LOG(WT/70)*0.75
  V3WT  = LOG(WT/70)
  QWT = LOG(WT/70)*0.75


; CRCL effect on CL
  RFN=0
  IF(CRCL.LT.80) RFN=LOG(CRCL/80)*THETA(6) ; RF effect only wneh CRCL < 80 ml/min/1.73m^2

; Child-Pugh (CP) category on CL
  LIV=0
  IF(CP.EQ.3)LIV=THETA(7) ; liver function only important for bad liver (CP=3)

  KA   = EXP(THETA(1)+ETA(1))
  V2   = EXP(THETA(2)+V2WT+ETA(2))
  CL   = EXP(THETA(3)+CLWT+RFN+LIV+ETA(3))
  V3   = EXP(THETA(4)+V3WT)
  Q    = EXP(THETA(5)+QWT)

  K=CL/V2
  K12=KA
  K23=Q/V2
  K32=Q/V3
  S2 = V2/1000 ; dose in mcg, conc in mcg/mL

$DES
 CONC=A(2)/V2
 DADT(1)=-KA*A(1)
 DADT(2)= KA*A(1) - K23*A(2) + K32*A(3) - K*A(2)
 DADT(3)= K23*A(2) - K32*A(3)


$ERROR
 IPRED = F
 Y=IPRED*(1+EPS(1))+EPS(2)

$THETA
(0.5)    ;  [1/hr] KA
(3.5)    ;  [L]    V1
(1)      ;  [L/hr] CL
(4)      ;  [L] V2
(2)      ;  [L/hr] Q
(0.4)    ;  [f] Renal
(0.01)   ;  [f] Child-Pugh

$OMEGA BLOCK(3)
        0.2        ; [P]  Ka
        0.003
        0.04        ; [P]  CL
        0.002
        0.001
        0.05        ; [P]  V2

$SIGMA
0.05     ; [P] Prop
2        ; [A] Add

$EST MAXEVAL=9999 METHOD=1 INTER SIGL=9 NSIG=3 PRINT=1 MSFO=./101.msf
$COV UNC
$TABLE ID TIME CMT EVID AMT TAFD TAD DV IPRED CWRESI NOPRINT ONEHEADER FILE=./101.tab
$TABLE ID TIME EVID AGE WT CRCL CL V2 KA ETA1 ETA2 ETA3 NOAPPEND NOPRINT ONEHEADER FILE=./101par.tab

NM-TRAN MESSAGES
 WARNINGS AND ERRORS (IF ANY) FOR PROBLEM    1
 (WARNING  2) NM-TRAN INFERS THAT THE DATA ARE POPULATION.

1NONLINEAR MIXED EFFECTS MODEL PROGRAM (NONMEM) VERSION 7.4.3
 ORIGINALLY DEVELOPED BY STUART BEAL, LEWIS SHEINER, AND ALISON BOECKMANN
 CURRENT DEVELOPERS ARE ROBERT BAUER, ICON DEVELOPMENT SOLUTIONS,
 AND ALISON BOECKMANN. IMPLEMENTATION, EFFICIENCY, AND STANDARDIZATION
 PERFORMED BY NOUS INFOSYSTEMS.
 PROBLEM NO.:         1
 RUN# 101 - fit of Phase I data - full model
 TOT. NO. OF OBS RECS:     3142
 TOT. NO. OF INDIVIDUALS:      160
 GENERAL NONLINEAR KINETICS MODEL WITH STIFF/NONSTIFF EQUATIONS (LSODA, ADVAN13)
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 #TBLN:      1
 #METH: First Order Conditional Estimation with Interaction
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
 #TERM:
0MINIMIZATION SUCCESSFUL
 HOWEVER, PROBLEMS OCCURRED WITH THE MINIMIZATION.
 REGARD THE RESULTS OF THE ESTIMATION STEP CAREFULLY, AND ACCEPT THEM ONLY
 AFTER CHECKING THAT THE COVARIANCE STEP PRODUCES REASONABLE OUTPUT.
 NO. OF FUNCTION EVALUATIONS USED:      845
 NO. OF SIG. DIGITS IN FINAL EST.:  4.0

 ETABAR IS THE ARITHMETIC MEAN OF THE ETA-ESTIMATES,
 AND THE P-VALUE IS GIVEN FOR THE NULL HYPOTHESIS THAT THE TRUE MEAN IS 0.

 ETABAR:        -1.1359E-02 -1.0628E-03  5.3966E-04
 SE:             3.2454E-02  2.1515E-02  2.4608E-02
 N:                     160         160         160

 P VAL.:         7.2635E-01  9.6060E-01  9.8250E-01

 ETASHRINKSD(%)  1.1968E+01  4.9245E+00  1.1502E+00
 ETASHRINKVR(%)  2.2503E+01  9.6064E+00  2.2871E+00
 EBVSHRINKSD(%)  1.2285E+01  5.2601E+00  1.4431E+00
 EBVSHRINKVR(%)  2.3061E+01  1.0243E+01  2.8654E+00
 EPSSHRINKSD(%)  4.8929E+00  4.8929E+00
 EPSSHRINKVR(%)  9.5464E+00  9.5464E+00


 TOTAL DATA POINTS NORMALLY DISTRIBUTED (N):         3142
 N*LOG(2PI) CONSTANT TO OBJECTIVE FUNCTION:    5774.60974265816
 OBJECTIVE FUNCTION VALUE WITHOUT CONSTANT:    30874.9304834182
 OBJECTIVE FUNCTION VALUE WITH CONSTANT:       36649.5402260764
 REPORTED OBJECTIVE FUNCTION DOES NOT CONTAIN CONSTANT

 TOTAL EFFECTIVE ETAS (NIND*NETA):                           480


 #TERE:
 Elapsed estimation  time in seconds:  1721.54
 Elapsed covariance  time in seconds:  1084.62
 Elapsed postprocess time in seconds:     5.25

 ********************               FIRST ORDER CONDITIONAL ESTIMATION WITH INTERACTION              ********************
 #OBJT:**************                       MINIMUM VALUE OF OBJECTIVE FUNCTION                      ********************
 #OBJV:********************************************    30874.930       **************************************************

 ********************               FIRST ORDER CONDITIONAL ESTIMATION WITH INTERACTION              ********************
 ********************                             FINAL PARAMETER ESTIMATE                           ********************

 THETA - VECTOR OF FIXED EFFECTS PARAMETERS   *********
         TH 1      TH 2      TH 3      TH 4      TH 5      TH 6      TH 7
         4.48E-01  4.12E+00  1.23E+00  4.21E+00  1.28E+00  6.27E-01 -5.47E-01

 OMEGA - COV MATRIX FOR RANDOM EFFECTS - ETAS  ********
         ETA1      ETA2      ETA3
 ETA1
+        2.19E-01
 ETA2
+        6.63E-02  8.25E-02
 ETA3
+        1.19E-01  6.69E-02  9.98E-02

 SIGMA - COV MATRIX FOR RANDOM EFFECTS - EPSILONS  ****
         EPS1      EPS2
 EPS1
+        3.98E-02
 EPS2
+        0.00E+00  1.14E+00

 OMEGA - CORR MATRIX FOR RANDOM EFFECTS - ETAS  *******
         ETA1      ETA2      ETA3
 ETA1
+        4.68E-01
 ETA2
+        4.94E-01  2.87E-01
 ETA3
+        8.08E-01  7.37E-01  3.16E-01

 SIGMA - CORR MATRIX FOR RANDOM EFFECTS - EPSILONS  ***
         EPS1      EPS2
 EPS1
+        1.99E-01
 EPS2
+        0.00E+00  1.07E+00

 ********************               FIRST ORDER CONDITIONAL ESTIMATION WITH INTERACTION              ********************
 ********************                            STANDARD ERROR OF ESTIMATE                          ********************

 THETA - VECTOR OF FIXED EFFECTS PARAMETERS   *********
         TH 1      TH 2      TH 3      TH 4      TH 5      TH 6      TH 7
         6.54E-02  2.77E-02  2.74E-02  1.86E-02  3.51E-02  4.78E-02  6.25E-02

 OMEGA - COV MATRIX FOR RANDOM EFFECTS - ETAS  ********
         ETA1      ETA2      ETA3
 ETA1
+        5.57E-02
 ETA2
+        2.15E-02  1.00E-02
 ETA3
+        2.34E-02  9.10E-03  1.17E-02

 SIGMA - COV MATRIX FOR RANDOM EFFECTS - EPSILONS  ****
         EPS1      EPS2
 EPS1
+        1.21E-03
 EPS2
+       .........  1.20E+00

 OMEGA - CORR MATRIX FOR RANDOM EFFECTS - ETAS  *******
         ETA1      ETA2      ETA3
 ETA1
+        5.96E-02
 ETA2
+        1.11E-01  1.75E-02
 ETA3
+        9.09E-02  4.28E-02  1.85E-02

 SIGMA - CORR MATRIX FOR RANDOM EFFECTS - EPSILONS  ***
         EPS1      EPS2
 EPS1
+        3.04E-03
 EPS2
+       .........  5.64E-01

 ********************               FIRST ORDER CONDITIONAL ESTIMATION WITH INTERACTION              ********************
 ********************                          COVARIANCE MATRIX OF ESTIMATE                         ********************

            TH 1      TH 2      TH 3      TH 4      TH 5      TH 6      TH 7      OM11      OM12      OM13      OM22      OM23
             OM33      SG11      SG12      SG22
 TH 1
+        4.27E-03
 TH 2
+        1.03E-03  7.66E-04
 TH 3
+        7.99E-04  4.71E-04  7.53E-04
 TH 4
+       -2.86E-04 -8.74E-05  2.03E-05  3.46E-04
 TH 5
+       -1.08E-03 -4.43E-04 -1.52E-04  1.39E-04  1.23E-03
 TH 6
+       -2.47E-04  8.13E-05  4.76E-04  9.60E-05 -1.05E-04  2.29E-03
 TH 7
+       -1.11E-04 -7.26E-05 -4.37E-04 -2.03E-05  4.07E-04 -5.29E-04  3.91E-03
 OM11
+        9.05E-04  4.01E-05 -5.64E-05 -7.29E-05  3.01E-05 -4.14E-04  7.87E-04  3.10E-03
 OM12
+        1.56E-04 -4.05E-05  3.96E-06 -1.95E-05  1.76E-04 -9.47E-05  3.12E-06  7.50E-04  4.61E-04
 OM13
+        5.12E-04  2.37E-05 -9.63E-06 -4.89E-05  3.10E-05 -2.20E-04  2.00E-04  9.43E-04  3.81E-04  5.48E-04
 OM22
+        4.56E-06 -1.74E-05 -1.71E-05 -1.25E-05  9.09E-05 -4.88E-05  4.53E-05  1.92E-04  1.53E-04  1.09E-04  1.01E-04
 OM23
+        2.55E-05 -2.23E-05  6.61E-07 -1.05E-05  5.56E-05 -6.74E-06  4.96E-05  2.14E-04  1.47E-04  1.43E-04  6.89E-05  8.28E-05
 OM33
+        6.07E-05  1.88E-05  2.11E-05 -1.56E-05 -2.28E-05  3.77E-05  2.22E-05  2.12E-04  1.19E-04  1.69E-04  4.21E-05  8.24E-05
          1.36E-04
 SG11
+        1.17E-05  2.06E-06  7.77E-06  1.04E-06 -2.21E-08  3.44E-06 -1.50E-05 -4.26E-06  7.42E-07  4.11E-06 -9.65E-07  6.14E-07
          1.54E-06  1.48E-06
 SG12
+       ......... ......... ......... ......... ......... ......... ......... ......... ......... ......... ......... .........
         ......... ......... .........
 SG22
+        1.70E-03 -2.07E-03 -1.07E-03  5.72E-04  4.15E-03 -2.60E-03 -3.91E-03  2.23E-02  1.31E-02  1.16E-02  1.49E-03  2.78E-03
          3.48E-03  2.52E-04 .........  1.45E+00

 ********************               FIRST ORDER CONDITIONAL ESTIMATION WITH INTERACTION              ********************
 ********************                          CORRELATION MATRIX OF ESTIMATE                        ********************

            TH 1      TH 2      TH 3      TH 4      TH 5      TH 6      TH 7      OM11      OM12      OM13      OM22      OM23
             OM33      SG11      SG12      SG22
 TH 1
+        6.54E-02
 TH 2
+        5.70E-01  2.77E-02
 TH 3
+        4.45E-01  6.19E-01  2.74E-02
 TH 4
+       -2.36E-01 -1.70E-01  3.97E-02  1.86E-02
 TH 5
+       -4.70E-01 -4.56E-01 -1.58E-01  2.14E-01  3.51E-02
 TH 6
+       -7.91E-02  6.14E-02  3.63E-01  1.08E-01 -6.25E-02  4.78E-02
 TH 7
+       -2.71E-02 -4.19E-02 -2.55E-01 -1.75E-02  1.86E-01 -1.77E-01  6.25E-02
 OM11
+        2.48E-01  2.60E-02 -3.69E-02 -7.04E-02  1.54E-02 -1.56E-01  2.26E-01  5.57E-02
 OM12
+        1.11E-01 -6.82E-02  6.72E-03 -4.88E-02  2.34E-01 -9.22E-02  2.32E-03  6.26E-01  2.15E-02
 OM13
+        3.35E-01  3.65E-02 -1.50E-02 -1.12E-01  3.78E-02 -1.96E-01  1.37E-01  7.23E-01  7.59E-01  2.34E-02
 OM22
+        6.94E-03 -6.25E-02 -6.21E-02 -6.70E-02  2.58E-01 -1.02E-01  7.21E-02  3.43E-01  7.11E-01  4.62E-01  1.00E-02
 OM23
+        4.28E-02 -8.84E-02  2.65E-03 -6.19E-02  1.74E-01 -1.55E-02  8.73E-02  4.23E-01  7.52E-01  6.69E-01  7.54E-01  9.10E-03
 OM33
+        7.96E-02  5.83E-02  6.59E-02 -7.17E-02 -5.58E-02  6.76E-02  3.04E-02  3.26E-01  4.75E-01  6.19E-01  3.59E-01  7.75E-01
          1.17E-02
 SG11
+        1.48E-01  6.12E-02  2.33E-01  4.62E-02 -5.18E-04  5.92E-02 -1.98E-01 -6.30E-02  2.84E-02  1.44E-01 -7.91E-02  5.55E-02
          1.09E-01  1.21E-03
 SG12
+       ......... ......... ......... ......... ......... ......... ......... ......... ......... ......... ......... .........
         ......... ......... .........
 SG22
+        2.17E-02 -6.20E-02 -3.24E-02  2.56E-02  9.83E-02 -4.52E-02 -5.20E-02  3.32E-01  5.05E-01  4.13E-01  1.23E-01  2.54E-01
          2.47E-01  1.73E-01 .........  1.20E+00
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 Elapsed finaloutput time in seconds:     0.94
 #CPUT: Total CPU Time in Seconds,     2812.827
