$PROBLEM RUN# 510_fixed FIXED FULL COV MODEL
$INPUT C ID DV AMT II ADDL TIME RATE HT WT CLCR SEX AGE
$DATA  ../poppk_wcovs.csv IGNORE=C
$SUB ADVAN1 TRANS2

$PK
TVCL=THETA(1)*(CLCR/80)**THETA(3)*(AGE/45)**THETA(4)
CL=TVCL*EXP(ETA(1))
TVV=THETA(2)*(WT/70)**THETA(5)*(AGE/45)**THETA(6)
V=TVV*EXP(ETA(2))
S1=V
$ERROR
Y=F + F*ERR(1)
IPRED=F

$THETA
 12.2 FIX ;[L/day] CL
 92.9 FIXED ;[L] V
 (0.001 );[L/day] CL_{CLCR}
 (0.001) ;[L/day] CL_{AGE}
 (0.001) ;[L] V_{WT}
 (0.001) ;[L] V_{AGE}

$OMEGA BLOCK(1)
.005 FIX ;[P] CL
$OMEGA BLOCK SAME ;[P] CL-IOV

$SIGMA
0.04 ;[P] Residual

;$MSFI=./401.msf
$EST METH=1 INTERACTION PRINT=5 MAX=9999 SIG=3 NOABORT MSFO=./510_fixed.msf
$COV
$TABLE NOPRINT ONEHEADER FILE=./510_fixed.tab
 ID TIME IPRED EVID ETA1 ETA2
$TABLE NOPRINT ONEHEADER FILE=./510_fixedpar.tab
 ID TIME ETA1 ETA2 HT WT CLCR SEX AGE EVID
