Tue Jun 26 16:55:45 UTC 2018
$PROBLEM RUN# 511 FULL COV MODEL
$INPUT C ID DV AMT II ADDL TIME RATE HT WT CLCR SEX AGE
$DATA  ../poppk_wcovs.csv IGNORE=C
$SUB ADVAN3 TRANS4

$PK
TVCL=THETA(1)*(CLCR/80)**THETA(3)*(AGE/45)**THETA(4)
CL=TVCL*EXP(ETA(1))
TVV1=THETA(2)*(WT/70)**THETA(5)*(AGE/45)**THETA(6)
V1=TVV1*EXP(ETA(2))
TVV2=THETA(7)*(WT/70)
V2=TVV2*EXP(ETA(3))
TVQ=THETA(8)*(WT/70)
Q=TVQ*EXP(ETA(4))
S1=V1
S2=V2
$ERROR
Y=F + F*ERR(1)
IPRED=F

$THETA
 (0, 13) ;[L/day] CL
 (0, 75) ;[L] V1
 (0.001 );[L/day] CL_{CLCR}
 (0.001) ;[L/day] CL_{AGE}
 (0.001) ;[L] V_{WT}
 (0.001) ;[L] V_{AGE}
 (0, 100) ;[L] V2
 (0, 10) ;[L/day] Q

$OMEGA BLOCK(2)
(0.04) ;[P] CL
(0.02) ;[F] CL-V
(0.04) ;[P] V

$OMEGA BLOCK(2)
(0.04) ;[P] V2
(0.02) ;[F] V2-Q
(0.04) ;[P] Q

$SIGMA
0.04 ;[P] Residual

;$MSFI=./401.msf
$ESTIMATION MAXEVAL=9999 PRINT=5 METH=1 INT MSF=./511.msf
$COV
$TABLE NOPRINT ONEHEADER FILE=./511.tab
 ID TIME IPRED EVID ETA1 ETA2
$TABLE NOPRINT ONEHEADER FILE=./511par.tab
 ID TIME ETA1 ETA2 HT WT CLCR SEX AGE EVID

NM-TRAN MESSAGES
 WARNINGS AND ERRORS (IF ANY) FOR PROBLEM    1
 (WARNING  2) NM-TRAN INFERS THAT THE DATA ARE POPULATION.

1NONLINEAR MIXED EFFECTS MODEL PROGRAM (NONMEM) VERSION 7.4.1
 ORIGINALLY DEVELOPED BY STUART BEAL, LEWIS SHEINER, AND ALISON BOECKMANN
 CURRENT DEVELOPERS ARE ROBERT BAUER, ICON DEVELOPMENT SOLUTIONS,
 AND ALISON BOECKMANN. IMPLEMENTATION, EFFICIENCY, AND STANDARDIZATION
 PERFORMED BY NOUS INFOSYSTEMS.
 PROBLEM NO.:         1
 RUN# 511 FULL COV MODEL
 TOT. NO. OF OBS RECS:      560
 TOT. NO. OF INDIVIDUALS:       40
 TWO COMPARTMENT MODEL (ADVAN3)
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 #TBLN:      1
 #METH: First Order Conditional Estimation with Interaction
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
 #TERM:
0MINIMIZATION TERMINATED
 DUE TO PROXIMITY OF NEXT ITERATION EST. TO A VALUE
 AT WHICH THE OBJ. FUNC. IS INFINITE
0AT THE LAST COMPUTED INFINITE VALUE OF THE OBJ. FUNCT.:
 ERROR IN NCONTR WITH INDIVIDUAL      35   ID= 3.50000000000000E+01
 NUMERICAL HESSIAN OF OBJ. FUNC. FOR COMPUTING CONDITIONAL ESTIMATE
 IS NON POSITIVE DEFINITE
 THETA=
  1.26E+01   8.88E+01   2.25E-01   3.42E-01   4.32E-01  -5.81E-01   3.64E+00   2.19E+04

 NO. OF FUNCTION EVALUATIONS USED:      795
 NO. OF SIG. DIGITS UNREPORTABLE
0PARAMETER ESTIMATE IS NEAR ITS BOUNDARY

 ETABAR IS THE ARITHMETIC MEAN OF THE ETA-ESTIMATES,
 AND THE P-VALUE IS GIVEN FOR THE NULL HYPOTHESIS THAT THE TRUE MEAN IS 0.

 ETABAR:        -4.6183E-03 -8.2308E-03  2.1860E-07  1.7919E-03
 SE:             3.4032E-02  3.4357E-02  1.3358E-07  1.0950E-03
 N:                      40          40          40          40

 P VAL.:         8.9205E-01  8.1066E-01  1.0174E-01  1.0174E-01

 ETASHRINKSD(%)  1.7831E+00  3.4116E+00  9.9957E+01  9.9957E+01
 ETASHRINKVR(%)  3.5343E+00  6.7069E+00  1.0000E+02  1.0000E+02
 EBVSHRINKSD(%)  3.1289E+00  7.1307E+00  9.9944E+01  9.9944E+01
 EBVSHRINKVR(%)  6.1599E+00  1.3753E+01  1.0000E+02  1.0000E+02
 EPSSHRINKSD(%)  6.3210E+00
 EPSSHRINKVR(%)  1.2242E+01


 TOTAL DATA POINTS NORMALLY DISTRIBUTED (N):          560
 N*LOG(2PI) CONSTANT TO OBJECTIVE FUNCTION:    1029.21115718923
 OBJECTIVE FUNCTION VALUE WITHOUT CONSTANT:    359.580117274038
 OBJECTIVE FUNCTION VALUE WITH CONSTANT:       1388.79127446327
 REPORTED OBJECTIVE FUNCTION DOES NOT CONTAIN CONSTANT

 TOTAL EFFECTIVE ETAS (NIND*NETA):                           160


 #TERE:
 Elapsed estimation  time in seconds:    16.46
 Elapsed postprocess time in seconds:     0.05

 ********************               FIRST ORDER CONDITIONAL ESTIMATION WITH INTERACTION              ********************
 #OBJT:**************                       MINIMUM VALUE OF OBJECTIVE FUNCTION                      ********************
 #OBJV:********************************************      359.580       **************************************************

 ********************               FIRST ORDER CONDITIONAL ESTIMATION WITH INTERACTION              ********************
 ********************                             FINAL PARAMETER ESTIMATE                           ********************

 THETA - VECTOR OF FIXED EFFECTS PARAMETERS   *********
         TH 1      TH 2      TH 3      TH 4      TH 5      TH 6      TH 7      TH 8
         1.26E+01  8.90E+01  2.25E-01  3.29E-01  4.41E-01 -2.32E-01  3.85E+00  2.18E+04

 OMEGA - COV MATRIX FOR RANDOM EFFECTS - ETAS  ********
         ETA1      ETA2      ETA3      ETA4
 ETA1
+        4.93E-02
 ETA2
+        3.39E-03  5.19E-02
 ETA3
+        0.00E+00  0.00E+00  4.00E-06
 ETA4
+        0.00E+00  0.00E+00  3.28E-02  2.69E+02

 SIGMA - COV MATRIX FOR RANDOM EFFECTS - EPSILONS  ****
         EPS1
 EPS1
+        4.58E-02

 OMEGA - CORR MATRIX FOR RANDOM EFFECTS - ETAS  *******
         ETA1      ETA2      ETA3      ETA4
 ETA1
+        2.22E-01
 ETA2
+        6.70E-02  2.28E-01
 ETA3
+        0.00E+00  0.00E+00  2.00E-03
 ETA4
+        0.00E+00  0.00E+00  1.00E+00  1.64E+01

 SIGMA - CORR MATRIX FOR RANDOM EFFECTS - EPSILONS  ***
         EPS1
 EPS1
+        2.14E-01
 Elapsed finaloutput time in seconds:     0.09
 #CPUT: Total CPU Time in Seconds,       16.526
