Fri Aug 21 15:41:53 EDT 2020
$SIZES LPAR=40

$PROB Run# 1001.1

$INPUT C ID DV TIME AGE EVID DOSE PATIENT CMT AMT LOQ MDV FLG      BL STER REF CAT     DROP
$DATA ../tranNM_final.csv IGNORE=(C="C")

$SUBROUTINE ADVAN13 TRANS1 TOL=12

$PRIOR NWPRI NTHETA=6, NETA=4, NEPS=2, NTHP=6, NETP=4, NEPP=0

$MODEL
COMP = (SMWT, DEFOBS)

$PK
IF(PATIENT.EQ.0) KOUT = EXP(THETA(1) + ETA(1))
IF(PATIENT.EQ.1) KOUT = EXP(THETA(1) + ETA(2))

KIN1 = 0

IF(PATIENT.EQ.0) KCOV = 0
IF(PATIENT.EQ.1) KCOV = THETA(3)

IF(PATIENT.EQ.0) KIN2 = EXP(THETA(2))
IF(PATIENT.EQ.1) KINDMD = THETA(2) * KCOV
IF(PATIENT.EQ.1) KIN2 = EXP(KINDMD + ETA(3))

MTDIFF = 1
MTIME(1)= EXP(THETA(4))

KIN = KIN1*(1-MPAST(1)) + KIN2*(MPAST(1))

IF(PATIENT.EQ.0) SCALAR = 0                   ;healthy
IF(PATIENT.EQ.1) SCALAR = EXP(THETA(5) + ETA(4))    ;dmd

IF(PATIENT.EQ.0) EXPON = 0                            ;healthy
IF(PATIENT.EQ.1) EXPON = (EXP(THETA(6)) / (1 + EXP(THETA(6))))  ;dmd

A_0(1) = 0

$DES
IF(PATIENT.EQ.0) DIS = 0                                ;healthy

IF(T.EQ.0.AND.PATIENT.EQ.1) DIS = 0                       ;dmd
IF(T.GT.0.AND.PATIENT.EQ.1) DIS = SCALAR*EXP(T*(EXPON))   ;dmd

DADT(1) = KIN-(KOUT*A(1)*(1+DIS))

$ERROR
IF(PATIENT.EQ.0) Y = F + ERR(1) ;healthy
IF(PATIENT.EQ.1) Y = F + ERR(2) ;dmd

SMWT = A(1)
IPRED = F

$THETA
-0.574219127214817 ;[1/year] KOUT LOGD
5.67154052944669 ;[meters/year] KIN LOGD
1.03568637508119 ;[na] KCOV LOGD
0.241769673098703 ;[years] MTIME LOGD
-11.3632385211334 ;[na] Scalar LOGD
5.11272713931817 ;[na] EXPON LOGD

$OMEGA
0.09          ;[P] KOUThealthy

$OMEGA BLOCK (3)
    0.09          ;[P] KOUTdmd
    0.01          ;[P] cov21
    0.09          ;[P] KINdmd
    0.01          ;[P] cov31
    0.01          ;[P] cov32
    0.09          ;[P] SCALAR

$SIGMA
0.04           ;[A] healthy
0.04           ;[A] dmd

$THETAP ;prior mode for thetas
  -0.676 FIX
  5.8 FIX
  0.921 FIX
  0.390 FIX
  -11.4 FIX
  5 FIX

$THETAPV BLOCK(6) ;var-cov for prior on thetas --> uncertainty for thetas     *uncertainty
  10 FIX
  0  10
  0  0  10
  0  0  0  0.0625
  0  0  0  0  10
  0  0  0  0  0  2

$OMEGAP
  0.09 FIX

$OMEGAP BLOCK(3)
  0.09 FIX
  0.01 0.09
  0.01 0.01 0.09

$OMEGAPD (1 FIX)(3 FIX); df for each $omega block

$EST METHOD=BAYES LAPLACIAN NUMERICAL MUM=NNNNNN
NBURN = 5000 NITER = 10000 SEED = 1111
PRINT = 1 NOABORT FILE = 1001.1.TXT
$COV PRINT = E UNCONDITIONAL
$TABLE ID AGE PRED IPRED EVID ETAS(1:LAST) RES CWRES SMWT DIS KIN KOUT DIS NOPRINT ONEHEADER FILE=./1001.1.tab

NM-TRAN MESSAGES
 WARNINGS AND ERRORS (IF ANY) FOR PROBLEM    1
 (WARNING  2) NM-TRAN INFERS THAT THE DATA ARE POPULATION.
 (WARNING  3) THERE MAY BE AN ERROR IN THE ABBREVIATED CODE. THE FOLLOWING
 ONE OR MORE RANDOM VARIABLES ARE DEFINED WITH "IF" STATEMENTS THAT DO NOT
 PROVIDE DEFINITIONS FOR BOTH THE "THEN" AND "ELSE" CASES. IF ALL
 CONDITIONS FAIL, THE VALUES OF THESE VARIABLES WILL BE ZERO.
   KOUT Y
 (WARNING  90) WITH "NUMERICAL", "SLOW" IS ALSO REQUIRED ON $ESTIM RECORD.
 NM-TRAN HAS SUPPLIED THIS OPTION.
 (WARNING  121) INTERACTION IS IMPLIED WITH EM/BAYES ESTIMATION METHODS
 (WARNING  48) DES-DEFINED ITEMS ARE COMPUTED ONLY WHEN EVENT TIME
 INCREASES. E.G., DISPLAYED VALUES ASSOCIATED WITH THE FIRST EVENT RECORD
 OF AN INDIVIDUAL RECORD ARE COMPUTED WITH (THE LAST ADVANCE TO) AN EVENT
 TIME OF THE PRIOR INDIVIDUAL RECORD.

1NONLINEAR MIXED EFFECTS MODEL PROGRAM (NONMEM) VERSION 7.4.4
 ORIGINALLY DEVELOPED BY STUART BEAL, LEWIS SHEINER, AND ALISON BOECKMANN
 CURRENT DEVELOPERS ARE ROBERT BAUER, ICON DEVELOPMENT SOLUTIONS,
 AND ALISON BOECKMANN. IMPLEMENTATION, EFFICIENCY, AND STANDARDIZATION
 PERFORMED BY NOUS INFOSYSTEMS.
 PROBLEM NO.:         1
 Run# 1001.1
 TOT. NO. OF OBS RECS:      599
 TOT. NO. OF INDIVIDUALS:      240
 GENERAL NONLINEAR KINETICS MODEL WITH STIFF/NONSTIFF EQUATIONS (LSODA, ADVAN13)
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 #TBLN:      1
 #METH: MCMC Bayesian Analysis
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
 #TERM:
 BURN-IN WAS NOT TESTED FOR CONVERGENCE
 STATISTICAL PORTION WAS COMPLETED

 TOTAL DATA POINTS NORMALLY DISTRIBUTED (N):          599
 N*LOG(2PI) CONSTANT TO OBJECTIVE FUNCTION:    1100.8883627791979
 OBJECTIVE FUNCTION VALUE WITHOUT CONSTANT:    3842.5708721043416
 OBJECTIVE FUNCTION VALUE WITH CONSTANT:       4943.4592348835395
 REPORTED OBJECTIVE FUNCTION DOES NOT CONTAIN CONSTANT

 TOTAL EFFECTIVE ETAS (NIND*NETA):                           960
 NIND*NETA*LOG(2PI) CONSTANT TO OBJECTIVE FUNCTION:    1764.3619837529716
 OBJECTIVE FUNCTION VALUE WITHOUT CONSTANT:    3842.5708721043416
 OBJECTIVE FUNCTION VALUE WITH CONSTANT:       5606.9328558573134
 REPORTED OBJECTIVE FUNCTION DOES NOT CONTAIN CONSTANT

 PRIOR CONSTANT TO OBJECTIVE FUNCTION:    44.868349604386125
 OBJECTIVE FUNCTION VALUE WITHOUT CONSTANT:    3842.5708721043416
 OBJECTIVE FUNCTION VALUE WITH CONSTANT:       3887.4392217087275
 REPORTED OBJECTIVE FUNCTION DOES NOT CONTAIN CONSTANT


 #TERE:
 Elapsed estimation  time in seconds:  2898.17
 Elapsed covariance  time in seconds:     0.00

 ********************                              MCMC BAYESIAN ANALYSIS                            ********************
 #OBJT:**************                       AVERAGE VALUE OF LIKELIHOOD FUNCTION                     ********************
 #OBJV:********************************************     3842.571       **************************************************
 #OBJS:********************************************      164.659 (STD) **************************************************

 ********************                              MCMC BAYESIAN ANALYSIS                            ********************
 ********************                             FINAL PARAMETER ESTIMATE                           ********************

 THETA - VECTOR OF FIXED EFFECTS PARAMETERS   *********
         TH 1      TH 2      TH 3      TH 4      TH 5      TH 6
        -7.82E-01  5.70E+00  9.27E-01  3.13E-01 -1.18E+01  5.47E+00

 OMEGA - COV MATRIX FOR RANDOM EFFECTS - ETAS  ********
         ETA1      ETA2      ETA3      ETA4
 ETA1
+        1.05E-02
 ETA2
+        0.00E+00  1.51E-01
 ETA3
+        0.00E+00  8.29E-02  6.69E-02
 ETA4
+        0.00E+00 -6.60E-01 -3.17E-01  7.47E+00

 SIGMA - COV MATRIX FOR RANDOM EFFECTS - EPSILONS  ****
         EPS1      EPS2
 EPS1
+        1.15E+03
 EPS2
+        0.00E+00  2.00E+03

 OMEGA - CORR MATRIX FOR RANDOM EFFECTS - ETAS  *******
         ETA1      ETA2      ETA3      ETA4
 ETA1
+        1.01E-01
 ETA2
+        0.00E+00  3.76E-01
 ETA3
+        0.00E+00  7.72E-01  2.48E-01
 ETA4
+        0.00E+00 -6.12E-01 -4.19E-01  2.72E+00

 SIGMA - CORR MATRIX FOR RANDOM EFFECTS - EPSILONS  ***
         EPS1      EPS2
 EPS1
+        3.36E+01
 EPS2
+        0.00E+00  4.47E+01

 ********************                              MCMC BAYESIAN ANALYSIS                            ********************
 ********************                STANDARD ERROR OF ESTIMATE (From Sample Variance)               ********************

 THETA - VECTOR OF FIXED EFFECTS PARAMETERS   *********
         TH 1      TH 2      TH 3      TH 4      TH 5      TH 6
         1.40E-01  1.27E-01  4.53E-03  2.24E-01  3.28E-01  1.14E+00

 OMEGA - COV MATRIX FOR RANDOM EFFECTS - ETAS  ********
         ETA1      ETA2      ETA3      ETA4
 ETA1
+        3.75E-03
 ETA2
+        0.00E+00  7.81E-02
 ETA3
+        0.00E+00  5.52E-02  3.97E-02
 ETA4
+        0.00E+00  3.39E-01  2.63E-01  1.39E+00

 SIGMA - COV MATRIX FOR RANDOM EFFECTS - EPSILONS  ****
         EPS1      EPS2
 EPS1
+        3.62E+02
 EPS2
+        0.00E+00  1.82E+02

 OMEGA - CORR MATRIX FOR RANDOM EFFECTS - ETAS  *******
         ETA1      ETA2      ETA3      ETA4
 ETA1
+        1.74E-02
 ETA2
+        0.00E+00  9.81E-02
 ETA3
+        0.00E+00  1.45E-01  7.19E-02
 ETA4
+        0.00E+00  2.06E-01  2.95E-01  2.50E-01

 SIGMA - CORR MATRIX FOR RANDOM EFFECTS - EPSILONS  ***
         EPS1      EPS2
 EPS1
+        5.06E+00
 EPS2
+        0.00E+00  2.02E+00
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
 ********************                              MCMC BAYESIAN ANALYSIS                            ********************
 ********************           EIGENVALUES OF COR MATRIX OF ESTIMATE (From Sample Variance)         ********************

             1         2         3         4         5         6         7         8         9        10        11        12
             13        14        15
         1.19E-03  5.81E-03  1.56E-02  8.33E-02  2.44E-01  3.73E-01  4.66E-01  7.17E-01  9.15E-01  9.62E-01  1.00E+00  1.05E+00
          1.45E+00  2.53E+00  5.18E+00
 Elapsed postprocess time in seconds:     0.46
 Elapsed finaloutput time in seconds:     0.06
 #CPUT: Total CPU Time in Seconds,    16217.448
